! ====================================================================
! Long Fei HEXAPOLE (HALFCUT) — geometry-only export, MILLIMETRE units
! ====================================================================
! SYNC PAIR with MT_Geom_Export.txt — IDENTICAL geometry, only the unit
! magnitude differs: that file builds in MKS metres (FEM source of truth,
! -> magnetic_sim/ANSYS/main/IGES/, flag 6); THIS file builds in millimetres (-> magnetic_sim/ANSYS/main/
! model_check/, flag patched 6->2 by sed) so SolidWorks measures
! correct dimensions. Any geometry edit must be mirrored in BOTH files.
!
! Transform vs MT_Geom_Export.txt: every length x1000 (e-3 literal
! dropped, e-6 -> e-3, BTOL e-7 -> e-4). Angles are ratio-based and
! scale-invariant, so unchanged.
!
! 1 yoke ring + 6 protrusions + 3 lower poles + 3 upper tilted poles
! Lower poles (P1/P3/P6): milled half cone. Upper poles (P2/P4/P5): full cone.
! ====================================================================

! [MODIFIED] /CWD points to neutral scratch dir; ANSYS .db/.out/.png stay there
! [MODIFIED] IGESOUT at end of file writes .iges directly into magnetic_sim/ANSYS/main/model_check/ dir
/CWD,'G:\my_workspace\code\FEM_sim\magnetic_sim\ANSYS\main\ANSYS_data\long2016_hexapole_halfcut\geom_export_mm'

Finish
/cle
/PREP7

POLE_NUM = 6
*afun, DEG
BTOL, 1e-4
/UNITS, MKS

R_norm    = 0.5          ! [MODIFIED] match Long Fei original (was 1) — 500 µm in mm units
R_norm_xy = R_norm*sqrt(2.0/3.0)
R_norm_z  = R_norm/sqrt(3.0)

YOKE_IN_R  = 84/2.0
YOKE_OUT_R = 106/2.0
YOKE_MID_R = (YOKE_IN_R + YOKE_OUT_R)/2.0
YOKE_H     = 2.0
PROT_R     = 10.0/2.0
PROT_H     = 7.0

POLE_R        = 6.0/2
POLE_TIP_R    = 40.0e-3      ! [TIP VARIANT] fillet radius [mm]; CNC=0.4 / EDM=0.015 / baseline=40.0e-3
POLE_TIP_R_REF = 40.0e-3     ! [ADDED] fixed design ref: flank+base frozen at 40 µm (scenario A)
POLE_CONE_LEN = 15
POLE_CONE_HYP = sqrt(POLE_CONE_LEN**2 + POLE_R**2)
ANG1 = acos(POLE_R/POLE_CONE_HYP)
ANG2 = 90 - ANG1
L = POLE_CONE_LEN*POLE_TIP_R/POLE_R
POLE_TIP_CENTER = L/cos(ANG2)
POLE_CONE2_LEN  = L*cos(ANG2)
POLE_TIP_R2     = POLE_TIP_R*cos(ANG2)
POLE_TIP_FILLET_DROP = POLE_TIP_CENTER - POLE_TIP_R
POLE_TIP_FILLET_PROT = (POLE_CONE2_LEN - POLE_TIP_FILLET_DROP)
! [ADDED] scenario A: reference-fillet quantities drive the FIXED flank/base (use POLE_TIP_R_REF)
L_REF                    = POLE_CONE_LEN*POLE_TIP_R_REF/POLE_R
POLE_TIP_CENTER_REF      = L_REF/cos(ANG2)
POLE_TIP_FILLET_DROP_REF = POLE_TIP_CENTER_REF - POLE_TIP_R_REF
! [ADDED] tip-most retreat of the VARIANT fillet along the pole axis (0 at R = R_REF)
POLE_TIP_RETREAT         = POLE_TIP_FILLET_DROP - POLE_TIP_FILLET_DROP_REF
! [ADDED] 正交修正：上極尖端後退仰角 = arccos(1/3) = 70.5288 deg（Δ 無關；3 對連線→54.74°→兩兩正交、6 尖端共球）
POLE_TIP_RET_ANG         = acos(1.0/3.0)

! ===== Yoke ring + 6 protrusions =====
WPLANE, 1,0,0,0,,,,,,
WPcsys,-1,0

CYL4,0,0,YOKE_IN_R,0,YOKE_OUT_R,360,YOKE_H

*do, prot_ind, 1, POLE_NUM,1
    WPLANE,1,0,0,0,,,,,,
    WPcsys,-1,0
    *if, prot_ind,LE,3, then
        temp_prot_h = -PROT_H
        temp_prot_ang = 120*(prot_ind - 1)
    *else
        WPOFFS,0,0,YOKE_H
        temp_prot_h = PROT_H
        temp_prot_ang = 120*(prot_ind - 4) + 60
    *endif
    CYL4,YOKE_MID_R*cos(temp_prot_ang),YOKE_MID_R*sin(temp_prot_ang),PROT_R, ,,,temp_prot_h
*enddo

! [MODIFIED] Skip yoke+protrusions VADD — let final VOVLAP handle all topology
! (matches strategy used in p1p2_yoke / dipole_lower / dipole_tilted variants)

! ===== 3 lower poles (4 BLOCKs + filled cone) at azimuth 0°, 120°, 240° =====
X0_LOW = YOKE_MID_R*cos(0)
Y0_LOW = YOKE_MID_R*sin(0)
Z0_LOW = -PROT_H

*do, pole_ind,1,3,1
    WPLANE, 1,0,0,0,,,,,,
    WPcsys,-1,0
    ROTA_ANG = 120*(pole_ind-1)
    WPROTA, ROTA_ANG

    *get, VL_NUM, VOLU, ,NUM, MAX
    VL_START = VL_NUM + 1
    numstr, VOLU, VL_START

    BLOCK, X0_LOW - 5,  X0_LOW + 11, Y0_LOW - 5,  Y0_LOW + 5,  Z0_LOW - 10, Z0_LOW
    BLOCK, X0_LOW - 5,  X0_LOW - 2,  Y0_LOW - 10, Y0_LOW + 10, Z0_LOW - 10, Z0_LOW - 5
    BLOCK, X0_LOW - 10, X0_LOW - 2,  Y0_LOW - 5,  Y0_LOW + 5,  Z0_LOW - 10, Z0_LOW - 2
    BLOCK, X0_LOW - 10, X0_LOW - 5,  Y0_LOW - 10, Y0_LOW + 10, Z0_LOW - 10, Z0_LOW - 5

    *get, KP_NUM, KP  , ,NUM, MAX
    *get, LI_NUM, LINE, ,NUM, MAX
    KP_START = KP_NUM + 1
    LI_START = LI_NUM + 1
    numstr, KP,   KP_START
    numstr, LINE, LI_START

    l1 = R_norm_xy + POLE_TIP_RETREAT                                                                    ! [MODIFIED] scenario A: tip retreats (variant)
    l1_ang = atan2( 0 , R_norm_xy + POLE_TIP_RETREAT )
    l2 = sqrt( (R_norm_xy + POLE_TIP_RETREAT + POLE_TIP_FILLET_PROT)**2 + POLE_TIP_R2**2 )               ! [MODIFIED] blend on retreated tip, variant fillet
    l2_ang = atan2( POLE_TIP_R2 , (R_norm_xy + POLE_TIP_RETREAT + POLE_TIP_FILLET_PROT) )
    POLE_CONE_LEN_SHIFT = POLE_CONE_LEN + (R_norm_xy - POLE_TIP_FILLET_DROP_REF)                         ! [MODIFIED] base FIXED via REF drop
    l3 = sqrt( POLE_CONE_LEN_SHIFT**2 + POLE_R**2 )
    l3_ang = atan2( POLE_R , POLE_CONE_LEN )
    l4 = sqrt( (X0_LOW - 10)**2 + POLE_R**2 )
    l4_ang = atan2( POLE_R , (X0_LOW - 10) )
    l5 = abs( X0_LOW - 10 )
    l5_ang = atan2( 0 , (X0_LOW - 10) )
    l6 = abs( R_norm_xy + POLE_TIP_RETREAT + POLE_TIP_R )                                                ! [MODIFIED] arc center follows retreated tip, variant R
    l6_ang = atan2( 0, R_norm_xy + POLE_TIP_RETREAT + POLE_TIP_R )

    K , , l1*cos(ROTA_ANG + l1_ang) , l1*sin(ROTA_ANG + l1_ang), Z0_LOW - 6
    K , , l2*cos(ROTA_ANG + l2_ang) , l2*sin(ROTA_ANG + l2_ang), Z0_LOW - 6
    K , , l3*cos(ROTA_ANG + l3_ang) , l3*sin(ROTA_ANG + l3_ang), Z0_LOW - 6
    K , , l4*cos(ROTA_ANG + l4_ang) , l4*sin(ROTA_ANG + l4_ang), Z0_LOW - 6
    K , , l5*cos(ROTA_ANG + l5_ang) , l5*sin(ROTA_ANG + l5_ang), Z0_LOW - 6
    K , , l6*cos(ROTA_ANG + l6_ang) , l6*sin(ROTA_ANG + l6_ang), Z0_LOW - 6

    LARC , KP_START , KP_START + 1 , KP_START + 5 , POLE_TIP_R
    L , KP_START + 1 , KP_START + 2,,,,,,,,
    L , KP_START + 2 , KP_START + 3,,,,,,,,
    L , KP_START + 3 , KP_START + 4,,,,,,,,
    L , KP_START + 4 , KP_START,,,,,,,,

    *get, AR_NUM, AREA, ,NUM, MAX
    AR_START = AR_NUM + 1
    numstr, AREA, AR_START

    AL, LI_START, LI_START + 1, LI_START + 2, LI_START + 3, LI_START + 4
    VROTAT, AR_START, ,,,,,KP_START,KP_START + 4,,4

    ! [ADDED] Half-cut lower pole: subtract an upper-half block directly from
    ! [ADDED] the 4 VROTAT cone segments. Half-cut logic (BLOCK + VSBV) from
    ! [ADDED] magnetic_sim/hexapole-long2016/apdl/MT_..._Coil1.txt lines 186-188.
    ! [ADDED] Result: 磨平半錐體, flat top at z = Z0_LOW - 6 (mm).
    ! [ADDED] No VADD is used: boolean ops free low volume numbers, so a
    ! [ADDED] post-boolean *get,NUM,MAX is unreliable. The 4 cone-segment
    ! [ADDED] numbers are captured BEFORE any boolean op (reliable), and
    ! [ADDED] numstr forces the cut block to a deterministic number above them.
    vl_cone_first = VL_START + 4
    *get, vl_cone_max, VOLU, , NUM, MAX
    vl_cut = vl_cone_max + 1
    numstr, VOLU, vl_cut
    BLOCK, 0, X0_LOW - 10, Y0_LOW - 10, Y0_LOW + 10, Z0_LOW - 6, Z0_LOW
    FLST, 2, (vl_cone_max - vl_cone_first + 1), 6, ORDE, 2
    FITEM, 2, vl_cone_first
    FITEM, 2, -vl_cone_max
    VSBV, P51X, vl_cut
*enddo

ALLSEL

! ===== 3 upper poles (3 BLOCKs + tilted cone) at azimuth 60°, 180°, 300° =====
X0_HIGH = YOKE_MID_R*cos(0)
Y0_HIGH = YOKE_MID_R*sin(0)
Z0_HIGH = YOKE_H + PROT_H

*do, pole_ind,4,6,1
    WPLANE, 1,0,0,0,,,,,,
    WPcsys,-1,0
    ROTA_ANG = 120*(pole_ind-4) + 60
    WPROTA, ROTA_ANG

    *get, VL_NUM, VOLU, ,NUM, MAX
    VL_START = VL_NUM + 1
    numstr, VOLU, VL_START

    BLOCK, X0_HIGH - 3.5,  X0_HIGH + 8.5, Y0_HIGH - 5,  Y0_HIGH + 5,  Z0_HIGH, Z0_HIGH + 10
    BLOCK, X0_HIGH - 6.5,  X0_HIGH - 3.5, Y0_HIGH - 11, Y0_HIGH + 11, Z0_HIGH, Z0_HIGH + 10
    BLOCK, X0_HIGH - 16.5, X0_HIGH - 6.5, Y0_HIGH - 11, Y0_HIGH + 11, Z0_HIGH, Z0_HIGH + 10

    tip_upper_x = R_norm_xy*cos(ROTA_ANG)
    tip_upper_y = R_norm_xy*sin(ROTA_ANG)
    tip_upper_z = Z0_LOW - 6 + R_norm_z*2

    end_upper_x0 = X0_HIGH - 11.5
    end_upper_y0 = Y0_HIGH
    end_upper_z0 = Z0_HIGH + 5
    end_upper_x = sqrt( end_upper_x0**2 + end_upper_y0**2 )*cos(ROTA_ANG)
    end_upper_y = sqrt( end_upper_x0**2 + end_upper_y0**2 )*sin(ROTA_ANG)
    end_upper_z = end_upper_z0

    INCLINE_VECTORx = end_upper_x - tip_upper_x
    INCLINE_VECTORy = end_upper_y - tip_upper_y
    INCLINE_VECTORz = end_upper_z - tip_upper_z
    INCLINE_ANG = atan2( INCLINE_VECTORz, sqrt(INCLINE_VECTORx**2+INCLINE_VECTORy**2) )

    *get, KP_NUM, KP  , ,NUM, MAX
    *get, LI_NUM, LINE, ,NUM, MAX
    KP_START = KP_NUM + 1
    LI_START = LI_NUM + 1
    numstr, KP,   KP_START
    numstr, LINE, LI_START

    p1x = tip_upper_x + POLE_TIP_RETREAT*cos(POLE_TIP_RET_ANG)*cos(ROTA_ANG) ! [MODIFIED] 正交修正：尖端沿 arccos(1/3)=70.53° 後退（非 INCLINE_ANG）
    p1y = tip_upper_y + POLE_TIP_RETREAT*cos(POLE_TIP_RET_ANG)*sin(ROTA_ANG) ! [MODIFIED]
    p1z = tip_upper_z + POLE_TIP_RETREAT*sin(POLE_TIP_RET_ANG)              ! [MODIFIED]

    ! [ADDED] 錐體軸 = 後退尖端 p1 → 固定 end_upper（保 yoke 連接、子午線共面；Δ=0 時 = INCLINE_ANG）
    CONE_VECx = end_upper_x - p1x
    CONE_VECy = end_upper_y - p1y
    CONE_VECz = end_upper_z - p1z
    CONE_ANG  = atan2( CONE_VECz, sqrt(CONE_VECx**2 + CONE_VECy**2) )

    p2x = p1x + POLE_TIP_FILLET_PROT*cos(CONE_ANG)*cos(ROTA_ANG) - POLE_TIP_R2*sin(ROTA_ANG)   ! [MODIFIED] 沿 CONE_ANG
    p2y = p1y + POLE_TIP_FILLET_PROT*cos(CONE_ANG)*sin(ROTA_ANG) + POLE_TIP_R2*cos(ROTA_ANG)   ! [MODIFIED]
    p2z = p1z + POLE_TIP_FILLET_PROT*sin(CONE_ANG)                                             ! [MODIFIED]

    POLE_CONE_LEN_SHIFT = POLE_CONE_LEN + (R_norm_xy - POLE_TIP_FILLET_DROP_REF)                 ! base length（REF drop 固定）
    p3x = p1x + POLE_CONE_LEN_SHIFT*cos(CONE_ANG)*cos(ROTA_ANG) - POLE_R*sin(ROTA_ANG)   ! [MODIFIED] 錨 p1、沿 CONE_ANG（子午線共面）
    p3y = p1y + POLE_CONE_LEN_SHIFT*cos(CONE_ANG)*sin(ROTA_ANG) + POLE_R*cos(ROTA_ANG)   ! [MODIFIED]
    p3z = p1z + POLE_CONE_LEN_SHIFT*sin(CONE_ANG)                                        ! [MODIFIED]

    p4x = end_upper_x - POLE_R*sin(ROTA_ANG)
    p4y = end_upper_y + POLE_R*cos(ROTA_ANG)
    p4z = end_upper_z

    p5x = end_upper_x
    p5y = end_upper_y
    p5z = end_upper_z

    p6x = p1x + POLE_CONE_LEN*cos(CONE_ANG)*cos(ROTA_ANG)     ! [MODIFIED] 沿 CONE_ANG
    p6y = p1y + POLE_CONE_LEN*cos(CONE_ANG)*sin(ROTA_ANG)     ! [MODIFIED]
    p6z = p1z + POLE_CONE_LEN*sin(CONE_ANG)                   ! [MODIFIED]

    K,, p1x , p1y , p1z
    K,, p2x , p2y , p2z
    K,, p3x , p3y , p3z
    K,, p4x , p4y , p4z
    K,, p5x , p5y , p5z
    K,, p6x , p6y , p6z

    LARC , KP_START , KP_START + 1 , KP_START + 5 , POLE_TIP_R
    L , KP_START + 1 , KP_START + 2,,,,,,,,
    L , KP_START + 2 , KP_START + 3,,,,,,,,
    L , KP_START + 3 , KP_START + 4,,,,,,,,
    L , KP_START + 4 , KP_START,,,,,,,,

    *get, AR_NUM, AREA, ,NUM, MAX
    AR_START = AR_NUM + 1
    numstr, AREA, AR_START

    AL, LI_START, LI_START + 1, LI_START + 2, LI_START + 3, LI_START + 4
    VROTAT, AR_START, ,,,,,KP_START, KP_START + 4,,4
*enddo

ALLSEL

! ===== VOVLAP (clean topology) =====
ALLSEL, ALL
VOVLAP, ALL
NUMCMP, VOLU
ALLSEL, ALL

! ===== Render multiple PNG views =====
/SHOW, PNG
/COLOR, VOLU, MRED

! ISO view
/VIEW, 1, 1, 1, 1
/ANG, 1
/AUTO, 1
VPLOT

! Front view (xz plane, looking from -y)
/VIEW, 1, 0, -1, 0
/ANG, 1
/AUTO, 1
VPLOT

! Top view (xy plane, looking from +z)
/VIEW, 1, 0, 0, 1
/ANG, 1
/AUTO, 1
VPLOT

/SHOW, CLOSE

! ===== IGES export =====
ALLSEL, ALL
! [ADDED] SolidWorks 相容：座標縮成 inch-magnitude（×1/25.4）→ 配 flag 6→1（INCH）；SW 忽略 flag 當 inch 讀，
!   inch 座標 + inch flag = 正確 mm（mm-magnitude+flag2 會被讀成 ×25.4 太大）。per kuo-iges-export 2026-07-06 更正。
CSYS,0                    ! [ADDED] 對全域原點縮放（deck 可能留著 local WP CS → VLSCALE 會對錯原點縮）
IGES_SC = 1.0/25.4
VLSCALE, ALL, , , IGES_SC, IGES_SC, IGES_SC, , 0, 1
ALLSEL, ALL
! [MODIFIED] Absolute path so IGES lands in magnetic_sim/ANSYS/main/model_check/ even though /CWD is elsewhere
IGESOUT, 'G:\my_workspace\code\FEM_sim\magnetic_sim\ANSYS\main\model_check\long_fei\long2016_hexapole_no_gap', 'iges'

FINISH
