! ====================================================================
! long2016 — P1 SINGLE POLE (磁極+支撐座+coil) for dimensional comparison
! ====================================================================
! P1 = +X-axis lower pole (azimuth 0deg), ACTUAL geometry = HALF-CUT flat-top cone.
!   pole (4 support BLOCKs + cone, VADD, then VSBV half-cut)
!   + protrusion (R5x7 coil core) + coil ring (solid Ri5/Ro8/H7, sim-nominal).
! WP shifted to ORIGIN (VGEN +z, WP native z = Z0_LOW-6+R_norm_z = -12.711 mm).
! Units mm (/UNITS,MKS); IGES unit flag patched 6->2 AFTER run (SolidWorks reads mm).
! Derived from MT_Geom_Export_mm_SinglePole.txt + MT_Geom_mm_WithCoil.txt.
! Output -> IGES/dif_singlepole_dim/long_p1.iges  (patched copy in model_check/)
! ====================================================================
/CWD,'G:\my_workspace\code\FEM_sim\magnetic_sim\ANSYS\main\ANSYS_data\long2016_hexapole_halfcut\db\geom\geom_p1_singlepole'

Finish
/cle
/PREP7
*afun, DEG
BTOL, 1e-4
/UNITS, MKS

R_norm    = 0.5
R_norm_xy = R_norm*sqrt(2.0/3.0)
R_norm_z  = R_norm/sqrt(3.0)

YOKE_IN_R  = 84/2.0
YOKE_OUT_R = 106/2.0
YOKE_MID_R = (YOKE_IN_R + YOKE_OUT_R)/2.0
YOKE_H     = 2.0
PROT_R     = 10.0/2.0
PROT_H     = 7.0

! [ADDED] coil ring (solid rep of SOURC36) — sim-nominal Ri=PROT_R, thk 3, H=PROT_H
COIL_IN_R  = 5.0
COIL_OUT_R = 8.0
COIL_H     = 7.0

POLE_R        = 6.0/2
POLE_TIP_R    = 40.0e-3
POLE_CONE_LEN = 15
POLE_CONE_HYP = sqrt(POLE_CONE_LEN**2 + POLE_R**2)
ANG1 = acos(POLE_R/POLE_CONE_HYP)
ANG2 = 90 - ANG1
L = POLE_CONE_LEN*POLE_TIP_R/POLE_R
POLE_TIP_CENTER = L/cos(ANG2)
POLE_CONE2_LEN  = L*cos(ANG2)
POLE_TIP_R2     = POLE_TIP_R*cos(ANG2)
POLE_TIP_FILLET_DROP = POLE_TIP_CENTER - POLE_TIP_R
POLE_TIP_FILLET_PROT = (POLE_CONE2_LEN - POLE_TIP_FILLET_DROP)

! ===== single lower protrusion (coil core) at azimuth 0deg =====
WPLANE, 1,0,0,0,,,,,,
WPcsys,-1,0
CYL4, YOKE_MID_R*cos(0), YOKE_MID_R*sin(0), PROT_R, ,,, -PROT_H

! ===== single lower pole (azimuth 0deg): 4 support BLOCKs + cone =====
X0_LOW = YOKE_MID_R*cos(0)
Y0_LOW = YOKE_MID_R*sin(0)
Z0_LOW = -PROT_H

WPLANE, 1,0,0,0,,,,,,
WPcsys,-1,0
ROTA_ANG = 0
WPROTA, ROTA_ANG

*get, VL_NUM, VOLU, ,NUM, MAX
VL_START = VL_NUM + 1
numstr, VOLU, VL_START

BLOCK, X0_LOW - 5,  X0_LOW + 11, Y0_LOW - 5,  Y0_LOW + 5,  Z0_LOW - 10, Z0_LOW
BLOCK, X0_LOW - 5,  X0_LOW - 2,  Y0_LOW - 10, Y0_LOW + 10, Z0_LOW - 10, Z0_LOW - 5
BLOCK, X0_LOW - 10, X0_LOW - 2,  Y0_LOW - 5,  Y0_LOW + 5,  Z0_LOW - 10, Z0_LOW - 2
BLOCK, X0_LOW - 10, X0_LOW - 5,  Y0_LOW - 10, Y0_LOW + 10, Z0_LOW - 10, Z0_LOW - 5

*get, KP_NUM, KP  , ,NUM, MAX
*get, LI_NUM, LINE, ,NUM, MAX
KP_START = KP_NUM + 1
LI_START = LI_NUM + 1
numstr, KP,   KP_START
numstr, LINE, LI_START

l1 = R_norm_xy
l1_ang = atan2( 0 , R_norm_xy )
l2 = sqrt( (R_norm_xy + POLE_TIP_FILLET_PROT)**2 + POLE_TIP_R2**2 )
l2_ang = atan2( POLE_TIP_R2 , (R_norm_xy + POLE_TIP_FILLET_PROT) )
POLE_CONE_LEN_SHIFT = POLE_CONE_LEN + (R_norm_xy - POLE_TIP_FILLET_DROP)
l3 = sqrt( POLE_CONE_LEN_SHIFT**2 + POLE_R**2 )
l3_ang = atan2( POLE_R , POLE_CONE_LEN )
l4 = sqrt( (X0_LOW - 10)**2 + POLE_R**2 )
l4_ang = atan2( POLE_R , (X0_LOW - 10) )
l5 = abs( X0_LOW - 10 )
l5_ang = atan2( 0 , (X0_LOW - 10) )
l6 = abs( R_norm_xy + POLE_TIP_R )
l6_ang = atan2( 0, R_norm_xy + POLE_TIP_R )

K , , l1*cos(ROTA_ANG + l1_ang) , l1*sin(ROTA_ANG + l1_ang), Z0_LOW - 6
K , , l2*cos(ROTA_ANG + l2_ang) , l2*sin(ROTA_ANG + l2_ang), Z0_LOW - 6
K , , l3*cos(ROTA_ANG + l3_ang) , l3*sin(ROTA_ANG + l3_ang), Z0_LOW - 6
K , , l4*cos(ROTA_ANG + l4_ang) , l4*sin(ROTA_ANG + l4_ang), Z0_LOW - 6
K , , l5*cos(ROTA_ANG + l5_ang) , l5*sin(ROTA_ANG + l5_ang), Z0_LOW - 6
K , , l6*cos(ROTA_ANG + l6_ang) , l6*sin(ROTA_ANG + l6_ang), Z0_LOW - 6

LARC , KP_START , KP_START + 1 , KP_START + 5 , POLE_TIP_R
L , KP_START + 1 , KP_START + 2,,,,,,,,
L , KP_START + 2 , KP_START + 3,,,,,,,,
L , KP_START + 3 , KP_START + 4,,,,,,,,
L , KP_START + 4 , KP_START,,,,,,,,

*get, AR_NUM, AREA, ,NUM, MAX
AR_START = AR_NUM + 1
numstr, AREA, AR_START

AL, LI_START, LI_START + 1, LI_START + 2, LI_START + 3, LI_START + 4
VROTAT, AR_START, ,,,,,KP_START,KP_START + 4,,4

! ===== [MODIFIED] VADD steel (protrusion + 4 blocks + 4 cone segs) -> 1 vol =====
ALLSEL, ALL
VADD, ALL
NUMCMP, VOLU                          ! VADD frees old vol nums -> renumber so cut BLOCK gets a clean next id
*get, vol_steel, VOLU,,NUM,MAX

! ===== [ADDED back] HALF-CUT: remove upper half (z > Z0_LOW-6) — actual geometry =====
BLOCK, 0, X0_LOW - 10, Y0_LOW - 10, Y0_LOW + 10, Z0_LOW - 6, Z0_LOW
*get, vol_cut, VOLU,,NUM,MAX
VSBV, vol_steel, vol_cut

ALLSEL, ALL

! ===== [ADDED] coil ring (separate solid body, wraps protrusion) =====
WPLANE, 1,0,0,0,,,,,,
WPcsys,-1,0
CYL4, YOKE_MID_R*cos(0), YOKE_MID_R*sin(0), COIL_IN_R, 0, COIL_OUT_R, 360, -COIL_H

ALLSEL, ALL
NUMCMP, VOLU

! ===== [ADDED] shift WP to ORIGIN (native WP z = Z0_LOW-6+R_norm_z = -12.711) =====
Z_SHIFT = -(Z0_LOW - 6 + R_norm_z)
ALLSEL, ALL
VGEN, 1, ALL, , , 0, 0, Z_SHIFT, , , 1
! [ADDED] VGEN moves volumes + their hierarchy but leaves ORPHAN keypoints (cone
!   profile / halfcut BLOCK leftovers) at old z. Select ONLY the volume hierarchy
!   so orphans are excluded from IGESOUT (and from the bbox).
VSEL, ALL
ALLSEL, BELOW, VOLU
NUMCMP, VOLU

! diagnostic: volume-hierarchy KP z-range (WP now at 0; lower tip -R_norm_z=-0.289; support bottom -4.29)
*GET, ZKMIN, KP, 0, MNLOC, Z
*GET, ZKMAX, KP, 0, MXLOC, Z
/GO
*MSG, INFO, ZKMIN, ZKMAX
 after shift (vol hierarchy): KP z range [%G , %G] mm

*get, fc_nvf, VOLU, 0, NUM, MAX
*msg, INFO, fc_nvf
 long2016 P1 single-pole: %I volumes (expect 2: steel + coil)

! ===== IGES export (mm magnitudes; flag patched 6->2 by PowerShell AFTER run) =====
! (volume hierarchy still selected from above -> orphan KPs excluded)
IGESOUT, 'G:\my_workspace\code\FEM_sim\magnetic_sim\ANSYS\main\IGES\dif_singlepole_dim\long_p1', 'iges'

FINISH
/EXIT, NOSAV
