! ====================================================================
! Long Fei HEXAPOLE (HALFCUT) + 6 Cu coil rings — geometry-only export, mm
! ====================================================================
! Same as MT_Geom_Export_mm.txt, BUT after VOVLAP, adds 6 annular rings
! (Cu coil winding) wrapping each protrusion. Output IGES has the coil
! rings as separate solid bodies (no boolean merge with protrusions).
!
! Coil ring dimensions (matching sim script COIL_IN_R / COIL_OUT_R):
!   Inner R  = PROT_R = 5 mm  (touches protrusion outer surface)
!   Outer R  = 8 mm
!   Height   = PROT_H = 7 mm  (same z range as the protrusion it wraps)
!
! Output: magnetic_sim/ANSYS/main/model_check/long2016_hexapole_halfcut/Geom_WithCoil.iges
! ====================================================================

! [MODIFIED 2026-08-04] 原 /CWD 指向 ANSYS_data\...\geom_mm_withcoil（從未建立、deck 無法執行）。
!   改指既有的 IGES 中繼 scratch（per main/CLAUDE.md：IGES 中繼走 db/geom/geom_hexvariants）。
/CWD,'G:\my_workspace\code\FEM_sim\magnetic_sim\ANSYS\main\ANSYS_data\long2016_hexapole_halfcut\db\geom\geom_hexvariants'

Finish
/cle
/PREP7

POLE_NUM = 6
*afun, DEG
BTOL, 1e-4
/UNITS, MKS

R_norm    = 0.5
R_norm_xy = R_norm*sqrt(2.0/3.0)
R_norm_z  = R_norm/sqrt(3.0)

YOKE_IN_R  = 84/2.0
YOKE_OUT_R = 106/2.0
YOKE_MID_R = (YOKE_IN_R + YOKE_OUT_R)/2.0
YOKE_H     = 2.0
PROT_R     = 10.0/2.0
PROT_H     = 7.0

! [ADDED] Coil ring dimensions
! [MODIFIED 2026-05-18] Introduced COIL_GAP=0.1 mm air gap to break degenerate
! coincident surfaces between coil ring inner cylinder and protrusion outer
! cylinder (was: COIL_IN_R = PROT_R = 5 mm exactly → coincident → COMSOL Form
! Union failed, SolidWorks rendered protrusions hidden inside ring holes).
! 100 um gap: 3.4% volume loss, magnetic field impact <1%, also realistic
! physical insulation thickness for solenoid wire-to-pole separation.
COIL_GAP   = 0.5                  ! mm, radial+axial air gap (was 0.1, enlarged for COMSOL AC mesh-ability — 100µm gap caused sliver tets making solver grind)
COIL_IN_R  = PROT_R + COIL_GAP    ! [MODIFIED comment] = 5.5 mm @GAP=0.5（原註解寫 5.1 是 GAP=0.1 時代殘留）
COIL_OUT_R = 8.0                  ! mm
COIL_H     = PROT_H - 2*COIL_GAP  ! [MODIFIED comment] = 6.0 mm @GAP=0.5（原註解寫 6.8 同為 GAP=0.1 殘留）
! [ADDED 2026-08-04] 只建指定的單一線圈：0 = 全 6 顆（現行行為，預設不變）；1..6 = 只建該顆。
!   用途：向量位交叉測試只激發 P1，未通電線圈 μr≈1 等同空氣、可省略。
!   ⚠ 對齊 SOURC36 標稱值（in 5 / out 8 / h 7 mm、截面 21 mm²）須另傳 COIL_GAP=0；
!     GAP=0.5 時截面只有 15 mm²，比標稱小 28.6%。
COIL_SEL   = 0

POLE_R        = 6.0/2
POLE_TIP_R    = 40.0e-3
POLE_CONE_LEN = 15
POLE_CONE_HYP = sqrt(POLE_CONE_LEN**2 + POLE_R**2)
ANG1 = acos(POLE_R/POLE_CONE_HYP)
ANG2 = 90 - ANG1
L = POLE_CONE_LEN*POLE_TIP_R/POLE_R
POLE_TIP_CENTER = L/cos(ANG2)
POLE_CONE2_LEN  = L*cos(ANG2)
POLE_TIP_R2     = POLE_TIP_R*cos(ANG2)
POLE_TIP_FILLET_DROP = POLE_TIP_CENTER - POLE_TIP_R
POLE_TIP_FILLET_PROT = (POLE_CONE2_LEN - POLE_TIP_FILLET_DROP)

! ===== Yoke ring + 6 protrusions =====
WPLANE, 1,0,0,0,,,,,,
WPcsys,-1,0

CYL4,0,0,YOKE_IN_R,0,YOKE_OUT_R,360,YOKE_H

*do, prot_ind, 1, POLE_NUM,1
    WPLANE,1,0,0,0,,,,,,
    WPcsys,-1,0
    *if, prot_ind,LE,3, then
        temp_prot_h = -PROT_H
        temp_prot_ang = 120*(prot_ind - 1)
    *else
        WPOFFS,0,0,YOKE_H
        temp_prot_h = PROT_H
        temp_prot_ang = 120*(prot_ind - 4) + 60
    *endif
    CYL4,YOKE_MID_R*cos(temp_prot_ang),YOKE_MID_R*sin(temp_prot_ang),PROT_R, ,,,temp_prot_h
*enddo

! [ADDED, Long Fei pattern] Merge yoke (vol 1) + 6 protrusions (vols 2-7) into single steel volume
FLST, 2, 1 + POLE_NUM, 6, ORDE, 2
FITEM, 2, 1
FITEM, 2, -(1 + POLE_NUM)
VADD, P51X
*get, vol_yoke_ind, VOLU,,NUM, MAX

! ===== 3 lower poles (Long Fei pattern: 4 BLOCKs + cone, VADD merge, then halfcut) =====
X0_LOW = YOKE_MID_R*cos(0)
Y0_LOW = YOKE_MID_R*sin(0)
Z0_LOW = -PROT_H

*do, pole_ind,1,3,1
    WPLANE, 1,0,0,0,,,,,,
    WPcsys,-1,0
    ROTA_ANG = 120*(pole_ind-1)
    WPROTA, ROTA_ANG

    *get, VL_NUM, VOLU, ,NUM, MAX
    VL_START = VL_NUM + 1
    numstr, VOLU, VL_START

    BLOCK, X0_LOW - 5,  X0_LOW + 11, Y0_LOW - 5,  Y0_LOW + 5,  Z0_LOW - 10, Z0_LOW
    BLOCK, X0_LOW - 5,  X0_LOW - 2,  Y0_LOW - 10, Y0_LOW + 10, Z0_LOW - 10, Z0_LOW - 5
    BLOCK, X0_LOW - 10, X0_LOW - 2,  Y0_LOW - 5,  Y0_LOW + 5,  Z0_LOW - 10, Z0_LOW - 2
    BLOCK, X0_LOW - 10, X0_LOW - 5,  Y0_LOW - 10, Y0_LOW + 10, Z0_LOW - 10, Z0_LOW - 5

    *get, KP_NUM, KP  , ,NUM, MAX
    *get, LI_NUM, LINE, ,NUM, MAX
    KP_START = KP_NUM + 1
    LI_START = LI_NUM + 1
    numstr, KP,   KP_START
    numstr, LINE, LI_START

    l1 = R_norm_xy
    l1_ang = atan2( 0 , R_norm_xy )
    l2 = sqrt( (R_norm_xy + POLE_TIP_FILLET_PROT)**2 + POLE_TIP_R2**2 )
    l2_ang = atan2( POLE_TIP_R2 , (R_norm_xy + POLE_TIP_FILLET_PROT) )
    POLE_CONE_LEN_SHIFT = POLE_CONE_LEN + (R_norm_xy - POLE_TIP_FILLET_DROP)
    l3 = sqrt( POLE_CONE_LEN_SHIFT**2 + POLE_R**2 )
    l3_ang = atan2( POLE_R , POLE_CONE_LEN )
    l4 = sqrt( (X0_LOW - 10)**2 + POLE_R**2 )
    l4_ang = atan2( POLE_R , (X0_LOW - 10) )
    l5 = abs( X0_LOW - 10 )
    l5_ang = atan2( 0 , (X0_LOW - 10) )
    l6 = abs( R_norm_xy + POLE_TIP_R )
    l6_ang = atan2( 0, R_norm_xy + POLE_TIP_R )

    K , , l1*cos(ROTA_ANG + l1_ang) , l1*sin(ROTA_ANG + l1_ang), Z0_LOW - 6
    K , , l2*cos(ROTA_ANG + l2_ang) , l2*sin(ROTA_ANG + l2_ang), Z0_LOW - 6
    K , , l3*cos(ROTA_ANG + l3_ang) , l3*sin(ROTA_ANG + l3_ang), Z0_LOW - 6
    K , , l4*cos(ROTA_ANG + l4_ang) , l4*sin(ROTA_ANG + l4_ang), Z0_LOW - 6
    K , , l5*cos(ROTA_ANG + l5_ang) , l5*sin(ROTA_ANG + l5_ang), Z0_LOW - 6
    K , , l6*cos(ROTA_ANG + l6_ang) , l6*sin(ROTA_ANG + l6_ang), Z0_LOW - 6

    LARC , KP_START , KP_START + 1 , KP_START + 5 , POLE_TIP_R
    L , KP_START + 1 , KP_START + 2,,,,,,,,
    L , KP_START + 2 , KP_START + 3,,,,,,,,
    L , KP_START + 3 , KP_START + 4,,,,,,,,
    L , KP_START + 4 , KP_START,,,,,,,,

    *get, AR_NUM, AREA, ,NUM, MAX
    AR_START = AR_NUM + 1
    numstr, AREA, AR_START

    AL, LI_START, LI_START + 1, LI_START + 2, LI_START + 3, LI_START + 4
    VROTAT, AR_START, ,,,,,KP_START,KP_START + 4,,4

    ! [ADDED, Long Fei pattern] VADD 4 BLOCKs + 4 cone segments → 1 pole vol
    *get, vl_ind_temp, VOLU,,NUM,MAX
    FLST, 2, (vl_ind_temp - VL_START + 1), 6, ORDE, 2
    FITEM, 2, VL_START
    FITEM, 2, -vl_ind_temp
    VADD, P51X

    ! VADD this pole vol with accumulated steel (yoke+prots+previous poles)
    *get, vol_pole_ind, VOLU,,NUM,MAX
    VADD, VL_NUM, vol_pole_ind

    ! Get merged steel vol id, then BLOCK cut (halfcut)
    *get, vol_unite_ind, VOLU,,NUM,MAX
    BLOCK, 0, X0_LOW - 10, Y0_LOW - 10, Y0_LOW + 10, Z0_LOW - 6, Z0_LOW
    VSBV, vol_unite_ind, vol_unite_ind + 1
*enddo

ALLSEL

! ===== 3 upper poles (3 BLOCKs + tilted cone) at azimuth 60°, 180°, 300° =====
X0_HIGH = YOKE_MID_R*cos(0)
Y0_HIGH = YOKE_MID_R*sin(0)
Z0_HIGH = YOKE_H + PROT_H

*do, pole_ind,4,6,1
    WPLANE, 1,0,0,0,,,,,,
    WPcsys,-1,0
    ROTA_ANG = 120*(pole_ind-4) + 60
    WPROTA, ROTA_ANG

    *get, VL_NUM, VOLU, ,NUM, MAX
    VL_START = VL_NUM + 1
    numstr, VOLU, VL_START

    BLOCK, X0_HIGH - 3.5,  X0_HIGH + 8.5, Y0_HIGH - 5,  Y0_HIGH + 5,  Z0_HIGH, Z0_HIGH + 10
    BLOCK, X0_HIGH - 6.5,  X0_HIGH - 3.5, Y0_HIGH - 11, Y0_HIGH + 11, Z0_HIGH, Z0_HIGH + 10
    BLOCK, X0_HIGH - 16.5, X0_HIGH - 6.5, Y0_HIGH - 11, Y0_HIGH + 11, Z0_HIGH, Z0_HIGH + 10

    tip_upper_x = R_norm_xy*cos(ROTA_ANG)
    tip_upper_y = R_norm_xy*sin(ROTA_ANG)
    tip_upper_z = Z0_LOW - 6 + R_norm_z*2

    end_upper_x0 = X0_HIGH - 11.5
    end_upper_y0 = Y0_HIGH
    end_upper_z0 = Z0_HIGH + 5
    end_upper_x = sqrt( end_upper_x0**2 + end_upper_y0**2 )*cos(ROTA_ANG)
    end_upper_y = sqrt( end_upper_x0**2 + end_upper_y0**2 )*sin(ROTA_ANG)
    end_upper_z = end_upper_z0

    INCLINE_VECTORx = end_upper_x - tip_upper_x
    INCLINE_VECTORy = end_upper_y - tip_upper_y
    INCLINE_VECTORz = end_upper_z - tip_upper_z
    INCLINE_ANG = atan2( INCLINE_VECTORz, sqrt(INCLINE_VECTORx**2+INCLINE_VECTORy**2) )

    *get, KP_NUM, KP  , ,NUM, MAX
    *get, LI_NUM, LINE, ,NUM, MAX
    KP_START = KP_NUM + 1
    LI_START = LI_NUM + 1
    numstr, KP,   KP_START
    numstr, LINE, LI_START

    p1x = tip_upper_x
    p1y = tip_upper_y
    p1z = tip_upper_z

    p2x = p1x + POLE_TIP_FILLET_PROT*cos(INCLINE_ANG)*cos(ROTA_ANG) - POLE_TIP_R2*sin(ROTA_ANG)
    p2y = p1y + POLE_TIP_FILLET_PROT*cos(INCLINE_ANG)*sin(ROTA_ANG) + POLE_TIP_R2*cos(ROTA_ANG)
    p2z = p1z + POLE_TIP_FILLET_PROT*sin(INCLINE_ANG)

    POLE_CONE_LEN_SHIFT = POLE_CONE_LEN + (R_norm_xy - POLE_TIP_FILLET_DROP)
    p3x = p1x + POLE_CONE_LEN_SHIFT*cos(INCLINE_ANG)*cos(ROTA_ANG) - POLE_R*sin(ROTA_ANG)
    p3y = p1y + POLE_CONE_LEN_SHIFT*cos(INCLINE_ANG)*sin(ROTA_ANG) + POLE_R*cos(ROTA_ANG)
    p3z = p1z + POLE_CONE_LEN_SHIFT*sin(INCLINE_ANG)

    p4x = end_upper_x - POLE_R*sin(ROTA_ANG)
    p4y = end_upper_y + POLE_R*cos(ROTA_ANG)
    p4z = end_upper_z

    p5x = end_upper_x
    p5y = end_upper_y
    p5z = end_upper_z

    p6x = p1x + POLE_CONE_LEN*cos(INCLINE_ANG)*cos(ROTA_ANG)
    p6y = p1y + POLE_CONE_LEN*cos(INCLINE_ANG)*sin(ROTA_ANG)
    p6z = p1z + POLE_CONE_LEN*sin(INCLINE_ANG)

    K,, p1x , p1y , p1z
    K,, p2x , p2y , p2z
    K,, p3x , p3y , p3z
    K,, p4x , p4y , p4z
    K,, p5x , p5y , p5z
    K,, p6x , p6y , p6z

    LARC , KP_START , KP_START + 1 , KP_START + 5 , POLE_TIP_R
    L , KP_START + 1 , KP_START + 2,,,,,,,,
    L , KP_START + 2 , KP_START + 3,,,,,,,,
    L , KP_START + 3 , KP_START + 4,,,,,,,,
    L , KP_START + 4 , KP_START,,,,,,,,

    *get, AR_NUM, AREA, ,NUM, MAX
    AR_START = AR_NUM + 1
    numstr, AREA, AR_START

    AL, LI_START, LI_START + 1, LI_START + 2, LI_START + 3, LI_START + 4
    VROTAT, AR_START, ,,,,,KP_START, KP_START + 4,,4

    ! [ADDED, Long Fei pattern] VADD 3 BLOCKs + 4 cone segments → 1 pole vol
    *get, vl_ind_temp, VOLU,,NUM,MAX
    FLST, 2, (vl_ind_temp - VL_START + 1), 6, ORDE, 2
    FITEM, 2, VL_START
    FITEM, 2, -vl_ind_temp
    VADD, P51X

    ! VADD this pole vol with accumulated steel
    *get, vol_pole_ind, VOLU,,NUM,MAX
    VADD, VL_NUM, vol_pole_ind
*enddo

ALLSEL

! [SKIPPED VOVLAP] After Long Fei VADD pattern, all steel is already merged into
! 1 single volume. VOVLAP needs >=2 vols to operate. The 6 coil rings below are
! geometrically separate (annulus 5-8mm) from steel, no overlap to resolve, so
! VOVLAP is unnecessary. Skipping it. NUMCMP keeps vol numbers tidy.
NUMCMP, VOLU
ALLSEL, ALL

! ====================================================================
! [ADDED] 6 Cu coil rings — separate solid bodies in IGES (not topologically
! merged with the steel since they touch but don't overlap).
! Each ring is an annular cylinder: r ∈ [COIL_IN_R, COIL_OUT_R], same
! axial extent as its protrusion.
! ====================================================================
*do, coil_ind, 1, POLE_NUM, 1
    ! [ADDED 2026-08-04] COIL_SEL>0 → 只建該顆線圈，其餘跳過
    *if, COIL_SEL, NE, 0, then
        *if, coil_ind, NE, COIL_SEL, then
            *cycle
        *endif
    *endif
    WPLANE,1,0,0,0,,,,,,
    WPcsys,-1,0
    *if, coil_ind,LE,3, then
        ! [MODIFIED] Shift z by -COIL_GAP so ring top doesn't touch yoke bottom
        ! lower coil: z from -0.1 down to -6.9 (was 0 to -7, coincident on both ends)
        WPOFFS,0,0,-COIL_GAP
        temp_coil_h = -COIL_H
        temp_coil_ang = 120*(coil_ind - 1)
    *else
        ! [MODIFIED] Shift z by +COIL_GAP so ring bottom doesn't touch yoke top
        ! upper coil: z from +2.1 up to +8.9 (was +2 to +9, coincident on both ends)
        WPOFFS,0,0,YOKE_H + COIL_GAP
        temp_coil_h = COIL_H
        temp_coil_ang = 120*(coil_ind - 4) + 60
    *endif
    CYL4, YOKE_MID_R*cos(temp_coil_ang), YOKE_MID_R*sin(temp_coil_ang), COIL_IN_R, 0, COIL_OUT_R, 360, temp_coil_h
*enddo

ALLSEL, ALL

! ====================================================================
! [ADDED 2026-08-04] 交付前幾何自驗：印線圈 volume 的體積與質心，與解析值對照。
!   期望（COIL_SEL=1, COIL_GAP=0）：體積 = pi*(8^2-5^2)*7 = 857.655 mm^3、
!   質心 = (YOKE_MID_R, 0, -PROT_H/2) = (47.5, 0, -3.5) mm。
!   ⚠ 本模型不可用 OCC 讀 ANSYS IGES 驗證（已知非均勻變形 xy×1.411），故在此就地驗。
! ====================================================================
*if, COIL_SEL, NE, 0, then
    ALLSEL, ALL
    CSYS, 0
    VSEL, S, LOC, X, YOKE_MID_R - COIL_OUT_R - 0.01, YOKE_MID_R + COIL_OUT_R + 0.01
    VSUM                                   ! [ADDED] *GET 的 VOLU/CENT 必須先 VSUM，否則被忽略
    *get, COIL_VNUM, VOLU,, NUM, MAX
    *get, COIL_VOL,  VOLU, COIL_VNUM, VOLU
    *get, COIL_CX,   VOLU, COIL_VNUM, CENT, X
    *get, COIL_CY,   VOLU, COIL_VNUM, CENT, Y
    *get, COIL_CZ,   VOLU, COIL_VNUM, CENT, Z
    COIL_VOL_EXP = 3.141592653589793*(COIL_OUT_R**2 - COIL_IN_R**2)*COIL_H
    *status, COIL_VNUM
    *status, COIL_VOL
    *status, COIL_VOL_EXP
    *status, COIL_CX
    *status, COIL_CY
    *status, COIL_CZ
    *status, COIL_IN_R
    *status, COIL_OUT_R
    *status, COIL_H
    ALLSEL, ALL
*endif

! ===== Render multiple PNG views =====
/SHOW, PNG
/COLOR, VOLU, MRED

/VIEW, 1, 1, 1, 1
/ANG, 1
/AUTO, 1
VPLOT

/VIEW, 1, 0, -1, 0
/ANG, 1
/AUTO, 1
VPLOT

/VIEW, 1, 0, 0, 1
/ANG, 1
/AUTO, 1
VPLOT

/SHOW, CLOSE

! ===== IGES export =====
ALLSEL, ALL
! [MODIFIED 2026-08-04] model_check 的 topic 夾早已改名 long2016_hexapole_halfcut → long_fei
!   （見 model_check/long_fei/README.md 命名慣例），原路徑不存在、IGESOUT 會失敗。
IGESOUT, 'G:\my_workspace\code\FEM_sim\magnetic_sim\ANSYS\main\model_check\long_fei\Geom_WithCoil', 'iges'

! [!! IMPORTANT POST-STEP !!] ANSYS IGESOUT writes unit flag = 6 (metres) regardless
! of /UNITS setting. Since geometry numbers are in mm here, the IGES gets read 1000×
! too large by SolidWorks/COMSOL unless we sed-patch flag 6 → 2 (millimetres):
!   sed -i "s/,1.0,6,,/,1.0,2,,/" Geom_WithCoil.iges
! Run this AFTER ANSYS exits. (Per magnetic_sim/ANSYS/main/model_check/ convention; see
! backup/hung/docs/ for the original metric->mm conversion note.)

FINISH
