! ============================================================================
! MT_Mesh_VP.txt  —  Long2016 hexapole halfcut  **向量位（vector potential）交叉測試** MESH-ONLY deck
!   [ADDED 2026-08-04] 由 MT_Mesh_Graded.txt 複製改造。目的：檢驗「APDL 純量位 vs Maxwell/COMSOL
!   向量位差 11~14%」是否來自 SOLID96 純量位離散化本身（已排除材料/幾何/安匝/網格/純量位公式化）。
!
!   與 MT_Mesh_Graded.txt 的六處差異（其餘逐字相同）：
!     ① 加 **coil 1 實體 volume**（環形 CYL4，內5/外8/高7mm @ R=47.5mm、z 0→−7mm、方位 0°）
!        插在外氣圓柱之後、單一 VOVLAP,ALL **之前** → 與空氣切分共節點。
!        只建 coil 1：其餘 5 顆未通電、μr≈1 等同空氣，物理上可省。
!     ② 加銅材料 MAT_CU（μr=1）
!     ③ VATT 分類鏈**最前面**加線圈分支 —— 原判據「dwp>10mm→鋼」會把線圈(dwp=48.4mm)判成
!        μr=280 的鋼、**靜默報廢整個結果**
!     ④ ET: SOLID96(純量位 MAG) → **SOLID237**（3-D 10-node 四面體 edge element，DOF=AZ）；
!        SOURC36 整段刪除（只服務純量位、與 AZ 不相容，改由 solve deck 對線圈元素施 BFE,,JS）
!        ⚠ SOLID236 是 20-node 六面體版，free-tet 網格要用 **237**
!     ⑤ SMRTSIZE 5→8 + 關閉兩段 cone EREFINE：edge element DOF 掛在邊上（≈邊數），
!        graded 那張 3.9M 元素換過去要 80–120GB / 10–20hr，不可行 → 用中等網格
!     ⑥ 加 per-volume DIAG + MAT_CU 驗證輸出
!
!   建幾何 + 網格 + SAVE 成 mesh_vp.db（**無 /SOLU、無 BC**）。
!   之後 solve deck `RESUME mesh_vp.db` → D,ALL,AZ,0 + BFE,,JS + SOLVE（mesh/solve 分離）。
!
!   ★ 定案 pipeline（一跑即產 ~656,163 節點 / 3,924,481 元素）：
!     ① 純 SMRTSIZE,5 + VMESH,ALL（零強制尺寸）= 自適應 base（~511k 節點）。
!        鐵律：此幾何任何硬性 ESIZE/AESIZE/LESIZE 都 sliver/thrash（試 ~12 次證實），只有純 smrt 能跑。
!     ② EREFINE 全極 cone +1 級（base→~579k）：smrt5 各區量測，只磁極 cone ~0.6mm 比 PDF(0.3) 粗 → 加密。
!     ③ EREFINE 下極 P1/P3/P6 cone 再 +1 級（→~656k）：下極比上極粗、再補一級（下極 2 級、其餘極 1 級）。
!     支撐座 + coil 鐵柱(protrusion) 維持 smrt5 粗：far-field 厚鋼、磁通近均勻、不影響精度；
!     且其鑲於超粗外圈空氣中，EREFINE 造不出合法過渡（無法局部細化，2 次含 DEPTH 皆失敗 → 放棄、不需要）。
!     各區密度：內球~0.15 / 中球~1.2 / yoke~0.6 / 外圓柱~3.7 / 磁極 cone ~0.3(下極更細) mm。
!
!   [ADDED] 中間球(R=MID_SPH_R 30mm)：把空氣過渡拆成 內球->中球->外圓柱（避免外圓柱直接 conform 細內球面爆 OOM）。
!   幾何 block = 照 sim/graded/MT_Sim_P1_graded.txt L26-358 verbatim（merged V8 保留）。
!   材料/網格分區一律 by location+size（VOVLAP/booleans 會清 VATT，volume 編號不可硬編）。
! ============================================================================

! [ADDED 2026-08-04] 網格粗細變體開關 —— 三處必須手動同步（APDL 的 /CWD、/FILNAME 在 /CLEAR
!   之前/之後，char param 會被 /CLEAR 清掉，無法單一參數驅動）：
!     (a) 下面 /CWD 的結尾夾名   (b) /FILNAME 的 jobname   (c) 下方 SMRT_LVL
!   已用過的組合：  vp / mesh_vp / SMRT_LVL=8（定案 VP 網格，416,294 節點）
!                   vp6 / mesh_vp6 / SMRT_LVL=6（加密對照，檢驗 smrt8 鋼件過粗是否為 +32% 主因）
/CWD,'G:\my_workspace\code\FEM_sim\magnetic_sim\ANSYS\main\ANSYS_data\long2016_hexapole_halfcut\db\mesh\vp6'
Finish
/cle
/CLEAR,NOSTART
/TITLE, Long2016 halfcut - VECTOR POTENTIAL mesh-only, coil1 solid (SAVE mesh_vp6.db)
/FILNAME,mesh_vp6,1
/PREP7

! -------------------------------------------------------------------
! [ADDED] region-graded element sizes (參數化；改這裡即可重調，各模型可套)
! -------------------------------------------------------------------
SMRT_LVL    = 6         ! [ADDED 2026-08-04] SmartSize 等級（小=細）。8=定案 VP 網格；6=加密對照。
                        !   ⚠ 改這裡要同步上面 /CWD 尾夾名 + /FILNAME（見檔頭變體開關說明）
ESIZE_CORE  = 0.1e-3    ! WP 細球 R<=CORE_R
ESIZE_SHELL = 0.6e-3    ! [MODIFIED→base] 內球 base 0.6mm（Stage2 NREFINE 1 級→0.3mm；base 壓低元素量避 choke）
ESIZE_MID   = 1.5e-3    ! [ADDED] 中間空氣球殼 (7mm..MID_SPH_R)：把 0.3->4mm 拆成 0.3->1.5->4 兩段過渡，避免單體積大跳爆 OOM
ESIZE_POLE  = 0.6e-3    ! [MODIFIED→base] 極身 base 0.6mm（Stage2 NREFINE→0.3mm）
ESIZE_YOKE  = 1.5e-3    ! yoke body
ESIZE_OUTER = 8.0e-3    ! [MODIFIED 4->8] 外圓柱：4mm 在 R80mm 大域 free-tet 卡 8hr（瓶頸=外圓柱本身）；graded 重點是 WP 近場細、遠場不必細 → 放粗 8mm
LSIZE_TIP   = 0.6e-3    ! [MODIFIED 20µm→base] 尖端 base 0.6mm（Stage2 NREFINE→~50µm；20µm base 太細爆量）
LSIZE_PROT  = 0.6e-3    ! [MODIFIED 0.3→base] protrusion base 0.6mm（Stage2 NREFINE→0.3mm）
CORE_R      = 0.4e-3    ! [MODIFIED 2.0->0.6->0.8->0.4] WP 細球半徑：R0.6 sliver / R0.8 爆炸（窗口太窄）。
                        !   改 R<500µm 尖端距離 → core 純空氣、零鋼極相交(無 sliver) + 小而簡單(不爆)；尖端由 20µm LESIZE 解析

MESH_SIZE = 5
POLE_NUM  = 6
*dim, POLE_ARRAY,,  POLE_NUM
*dim, PROT_ARRAY,,  POLE_NUM
*afun, DEG
BTOL, 1e-6
/UNITS, MKS

R_norm    = 500e-6
R_norm_xy = R_norm*sqrt(2.0/3.0)
R_norm_z  = R_norm/sqrt(3.0)
YOKE_IN_R  = 84e-3/2.0
YOKE_OUT_R = 106e-3/2.0
YOKE_MID_R = (YOKE_IN_R + YOKE_OUT_R)/2.0
YOKE_H     = 2.0e-3
PROT_R     = 10.0e-3/2.0
PROT_H     = 7.0e-3
POLE_R        = 6.0e-3/2
POLE_TIP_R    = 40.0e-6
POLE_TIP_R_REF = 40.0e-6     ! [ADDED] scenario-A: fixed design ref (flank+base frozen at 40 um tip)
POLE_CONE_LEN = 15e-3
POLE_CONE_HYP = sqrt(POLE_CONE_LEN**2 + POLE_R**2)
ANG1 = acos(POLE_R/POLE_CONE_HYP)
ANG2 = 90 - ANG1
L = POLE_CONE_LEN*POLE_TIP_R/POLE_R
POLE_TIP_CENTER = L/cos(ANG2)
POLE_CONE2_LEN  = L*cos(ANG2)
POLE_TIP_R2     = POLE_TIP_R*cos(ANG2)
POLE_TIP_FILLET_DROP = POLE_TIP_CENTER - POLE_TIP_R
POLE_TIP_FILLET_PROT = (POLE_CONE2_LEN - POLE_TIP_FILLET_DROP)
! [ADDED] scenario A: reference-fillet quantities drive the FIXED flank/base (use POLE_TIP_R_REF)
L_REF                    = POLE_CONE_LEN*POLE_TIP_R_REF/POLE_R
POLE_TIP_CENTER_REF      = L_REF/cos(ANG2)
POLE_TIP_FILLET_DROP_REF = POLE_TIP_CENTER_REF - POLE_TIP_R_REF
! [ADDED] tip-most retreat of the VARIANT fillet along the pole axis (0 at R = R_REF)
POLE_TIP_RETREAT         = POLE_TIP_FILLET_DROP - POLE_TIP_FILLET_DROP_REF
! [ADDED] 正交修正：上極尖端後退仰角 = arccos(1/3) = 70.5288 deg（Δ 無關；3 對連線→54.74°→兩兩正交、6 尖端共球）
POLE_TIP_RET_ANG         = acos(1.0/3.0)

! ===== Yoke + 6 protrusions (VADD 合併成 V8，照 baseline) =====
WPLANE, 1,0,0,0,,,,,,
WPcsys,-1,0
CYL4,0,0,YOKE_IN_R,0,YOKE_OUT_R,360,YOKE_H
*do, prot_ind, 1, POLE_NUM,1
	WPLANE,1,0,0,0,,,,,,
	WPcsys,-1,0
	*if, prot_ind,LE,3, then
		temp_prot_h = -PROT_H
		temp_prot_ang = 120*(prot_ind - 1)
	*else
		WPOFFS,0,0,YOKE_H
		temp_prot_h = PROT_H
		temp_prot_ang = 120*(prot_ind - 4) + 60
	*endif
	CYL4,YOKE_MID_R*cos(temp_prot_ang),YOKE_MID_R*sin(temp_prot_ang),PROT_R, ,,,temp_prot_h
*enddo
FLST,2, 1 + POLE_NUM, 6,ORDE, 2
FITEM,2, 1
FITEM,2,-(1+POLE_NUM)
VADD,P51X
*get, vol_yoke_ind, VOLU,,NUM, MAX

! ===== 3 lower poles (half-cut) =====
X0_LOW = YOKE_MID_R*cos(0)
Y0_LOW = YOKE_MID_R*sin(0)
Z0_LOW = -PROT_H
*do, pole_ind,1,3,1
	WPLANE, 1,0,0,0,,,,,,
	WPcsys,-1,0
	ROTA_ANG = 120*(pole_ind-1)
	WPROTA, ROTA_ANG,
	*get, VL_NUM, VOLU, ,NUM, MAX
	VL_START = VL_NUM + 1
	numstr, VOLU, VL_START
	BLOCK, X0_LOW - 5e-3,  X0_LOW + 11e-3, Y0_LOW - 5e-3,  Y0_LOW + 5e-3,  Z0_LOW - 10e-3, Z0_LOW
	BLOCK, X0_LOW - 5e-3,  X0_LOW - 2e-3,  Y0_LOW - 10e-3, Y0_LOW + 10e-3, Z0_LOW - 10e-3, Z0_LOW - 5e-3
	BLOCK, X0_LOW - 10e-3, X0_LOW - 2e-3,  Y0_LOW - 5e-3,  Y0_LOW + 5e-3,  Z0_LOW - 10e-3, Z0_LOW - 2e-3
	BLOCK, X0_LOW - 10e-3, X0_LOW - 5e-3,  Y0_LOW - 10e-3, Y0_LOW + 10e-3, Z0_LOW - 10e-3, Z0_LOW - 5e-3
	*get, KP_NUM, KP  , ,NUM, MAX
	*get, LI_NUM, LINE, ,NUM, MAX
	KP_START = KP_NUM + 1
	LI_START = LI_NUM + 1
	numstr, KP,   KP_START
	numstr, LINE, LI_START
	l1 = R_norm_xy + POLE_TIP_RETREAT
	l1_ang = atan2( 0 , R_norm_xy + POLE_TIP_RETREAT )
	l2 = sqrt( (R_norm_xy + POLE_TIP_RETREAT + POLE_TIP_FILLET_PROT)**2 + POLE_TIP_R2**2 )
	l2_ang = atan2( POLE_TIP_R2 , (R_norm_xy + POLE_TIP_RETREAT + POLE_TIP_FILLET_PROT) )
	POLE_CONE_LEN_SHIFT = POLE_CONE_LEN + (R_norm_xy - POLE_TIP_FILLET_DROP_REF)
	l3 = sqrt( POLE_CONE_LEN_SHIFT**2 + POLE_R**2 )
	l3_ang = atan2( POLE_R , POLE_CONE_LEN )
	l4 = sqrt( (X0_LOW - 10e-3)**2 + POLE_R**2 )
	l4_ang = atan2( POLE_R , (X0_LOW - 10e-3) )
	l5 = abs( X0_LOW - 10e-3 )
	l5_ang = atan2( 0 , (X0_LOW - 10e-3) )
	l6 = abs( R_norm_xy + POLE_TIP_RETREAT + POLE_TIP_R )
	l6_ang = atan2( 0, R_norm_xy + POLE_TIP_RETREAT + POLE_TIP_R )
	K , , l1*cos(ROTA_ANG + l1_ang) , l1*sin(ROTA_ANG + l1_ang), Z0_LOW - 6e-3
	K , , l2*cos(ROTA_ANG + l2_ang) , l2*sin(ROTA_ANG + l2_ang), Z0_LOW - 6e-3
	K , , l3*cos(ROTA_ANG + l3_ang) , l3*sin(ROTA_ANG + l3_ang), Z0_LOW - 6e-3
	K , , l4*cos(ROTA_ANG + l4_ang) , l4*sin(ROTA_ANG + l4_ang), Z0_LOW - 6e-3
	K , , l5*cos(ROTA_ANG + l5_ang) , l5*sin(ROTA_ANG + l5_ang), Z0_LOW - 6e-3
	K , , l6*cos(ROTA_ANG + l6_ang) , l6*sin(ROTA_ANG + l6_ang), Z0_LOW - 6e-3
	LARC , KP_START , KP_START + 1 , KP_START + 5 , POLE_TIP_R
	L , KP_START + 1 , KP_START + 2,,,,,,,,
	L , KP_START + 2 , KP_START + 3,,,,,,,,
	L , KP_START + 3 , KP_START + 4,,,,,,,,
	L , KP_START + 4 , KP_START,,,,,,,,
	*get, AR_NUM, AREA, ,NUM, MAX
	AR_START = AR_NUM + 1
	numstr, AREA, AR_START
	AL, LI_START, LI_START + 1, LI_START + 2, LI_START + 3, LI_START + 4
	VROTAT, AR_START, ,,,,,KP_START,KP_START + 4,,4
	*get, vl_ind_temp, VOLU,,NUM,MAX
	FLST,2,(vl_ind_temp - VL_START + 1),6,ORDE,2
	FITEM,2,VL_START
	FITEM,2,-vl_ind_temp
	VADD,P51X
	*get, vol_pole_ind, VOLU,,NUM,MAX
	VADD, VL_NUM, vol_pole_ind
	*get, vol_unite_ind, VOLU,,NUM,MAX
	BLOCK,0,X0_LOW - 10e-3,Y0_LOW - 10e-3,Y0_LOW + 10e-3,Z0_LOW - 6e-3, Z0_LOW
	VSBV, vol_unite_ind,vol_unite_ind + 1
*enddo

! ===== 3 upper poles =====
	X0_HIGH = YOKE_MID_R*cos(0)
	Y0_HIGH = YOKE_MID_R*sin(0)
	Z0_HIGH = YOKE_H + PROT_H
*do, pole_ind,4,6,1
	WPLANE, 1,0,0,0,,,,,,
	WPcsys,-1,0
	ROTA_ANG = 120*(pole_ind-4) + 60
	WPROTA, ROTA_ANG,
	*get, VL_NUM, VOLU, ,NUM, MAX
	VL_START = VL_NUM + 1
	numstr, VOLU, VL_START
	BLOCK, X0_HIGH - 3.5e-3,  X0_HIGH + 8.5e-3, Y0_HIGH - 5e-3,  Y0_HIGH + 5e-3,  Z0_HIGH, Z0_HIGH + 10e-3
	BLOCK, X0_HIGH - 6.5e-3,  X0_HIGH - 3.5e-3, Y0_HIGH - 11e-3, Y0_HIGH + 11e-3, Z0_HIGH, Z0_HIGH + 10e-3
	BLOCK, X0_HIGH - 16.5e-3, X0_HIGH - 6.5e-3, Y0_HIGH - 11e-3, Y0_HIGH + 11e-3, Z0_HIGH, Z0_HIGH + 10e-3
	tip_upper_x = R_norm_xy*cos(ROTA_ANG)
	tip_upper_y = R_norm_xy*sin(ROTA_ANG)
	tip_upper_z = Z0_LOW - 6e-3 + R_norm_z*2
	end_upper_x0 = X0_HIGH - 11.5e-3
	end_upper_y0 = Y0_HIGH
	end_upper_z0 = Z0_HIGH + 5e-3
	end_upper_x = sqrt( end_upper_x0**2 + end_upper_y0**2 )*cos(ROTA_ANG)
	end_upper_y = sqrt( end_upper_x0**2 + end_upper_y0**2 )*sin(ROTA_ANG)
	end_upper_z = end_upper_z0
	INCLINE_VECTORx = end_upper_x - tip_upper_x
	INCLINE_VECTORy = end_upper_y - tip_upper_y
	INCLINE_VECTORz = end_upper_z - tip_upper_z
	INCLINE_ANG = atan2( INCLINE_VECTORz, sqrt(INCLINE_VECTORx**2+INCLINE_VECTORy**2) )
	*get, KP_NUM, KP  , ,NUM, MAX
	*get, LI_NUM, LINE, ,NUM, MAX
	KP_START = KP_NUM + 1
	LI_START = LI_NUM + 1
	numstr, KP,   KP_START
	numstr, LINE, LI_START
	p1x = tip_upper_x + POLE_TIP_RETREAT*cos(POLE_TIP_RET_ANG)*cos(ROTA_ANG)   ! [MODIFIED] 正交修正：尖端沿 arccos(1/3)=70.53° 後退
	p1y = tip_upper_y + POLE_TIP_RETREAT*cos(POLE_TIP_RET_ANG)*sin(ROTA_ANG)   ! [MODIFIED]
	p1z = tip_upper_z + POLE_TIP_RETREAT*sin(POLE_TIP_RET_ANG)                 ! [MODIFIED]
	! [ADDED] 錐體軸 = 後退尖端 p1 → 固定 end_upper（保 yoke 連接、子午線共面；Δ=0 時 = INCLINE_ANG）
	CONE_VECx = end_upper_x - p1x
	CONE_VECy = end_upper_y - p1y
	CONE_VECz = end_upper_z - p1z
	CONE_ANG  = atan2( CONE_VECz, sqrt(CONE_VECx**2 + CONE_VECy**2) )
	p2x = p1x + POLE_TIP_FILLET_PROT*cos(CONE_ANG)*cos(ROTA_ANG) - POLE_TIP_R2*sin(ROTA_ANG)   ! [MODIFIED] 沿 CONE_ANG
	p2y = p1y + POLE_TIP_FILLET_PROT*cos(CONE_ANG)*sin(ROTA_ANG) + POLE_TIP_R2*cos(ROTA_ANG)   ! [MODIFIED]
	p2z = p1z + POLE_TIP_FILLET_PROT*sin(CONE_ANG)                                             ! [MODIFIED]
	POLE_CONE_LEN_SHIFT = POLE_CONE_LEN + (R_norm_xy - POLE_TIP_FILLET_DROP_REF)
	p3x = p1x + POLE_CONE_LEN_SHIFT*cos(CONE_ANG)*cos(ROTA_ANG) - POLE_R*sin(ROTA_ANG)   ! [MODIFIED] 錨 p1、沿 CONE_ANG
	p3y = p1y + POLE_CONE_LEN_SHIFT*cos(CONE_ANG)*sin(ROTA_ANG) + POLE_R*cos(ROTA_ANG)   ! [MODIFIED]
	p3z = p1z + POLE_CONE_LEN_SHIFT*sin(CONE_ANG)                                        ! [MODIFIED]
	p4x = end_upper_x - POLE_R*sin(ROTA_ANG)
	p4y = end_upper_y + POLE_R*cos(ROTA_ANG)
	p4z = end_upper_z
	p5x = end_upper_x
	p5y = end_upper_y
	p5z = end_upper_z
	p6x = p1x + POLE_CONE_LEN*cos(CONE_ANG)*cos(ROTA_ANG)   ! [MODIFIED] 沿 CONE_ANG
	p6y = p1y + POLE_CONE_LEN*cos(CONE_ANG)*sin(ROTA_ANG)   ! [MODIFIED]
	p6z = p1z + POLE_CONE_LEN*sin(CONE_ANG)                 ! [MODIFIED]
	K,, p1x , p1y , p1z
	K,, p2x , p2y , p2z
	K,, p3x , p3y , p3z
	K,, p4x , p4y , p4z
	K,, p5x , p5y , p5z
	K,, p6x , p6y , p6z
	LARC , KP_START , KP_START + 1 , KP_START + 5 , POLE_TIP_R
	L , KP_START + 1 , KP_START + 2,,,,,,,,
	L , KP_START + 2 , KP_START + 3,,,,,,,,
	L , KP_START + 3 , KP_START + 4,,,,,,,,
	L , KP_START + 4 , KP_START,,,,,,,,
	*get, AR_NUM, AREA, ,NUM, MAX
	AR_START = AR_NUM + 1
	numstr, AREA, AR_START
	AL, LI_START, LI_START + 1, LI_START + 2, LI_START + 3, LI_START + 4
	VROTAT, AR_START, ,,,,,KP_START,KP_START + 4,,4
	*get, vl_ind_temp, VOLU,,NUM,MAX
	FLST,2,(vl_ind_temp - VL_START + 1),6,ORDE,2
	FITEM,2,VL_START
	FITEM,2,-vl_ind_temp
	VADD,P51X
	*get, vol_pole_ind, VOLU,,NUM,MAX
	VADD, VL_NUM, vol_pole_ind
*enddo
NUMCMP,VOLU

! ===== 內球(7mm) + [ADDED] 中間球(25mm) + 外圓柱 =====
SPH_FINE_R = 7e-3
! [MODIFIED 25->30] R25 切過 yoke(R21-26mm) 產生 sliver thrash；放大到 R30>26 讓 yoke 全包進中球 → 外圓柱內界面=乾淨球面、無 sliver
MID_SPH_R  = 30e-3                       ! 中間氣球半徑
SPH_OFST = Z0_LOW - 6e-3 + R_norm_z
AIR_CYL_R = 80e-3
AIR_CYL_H = 70e-3
WPLANE, 1,0,0,0,,,,,,
WPcsys,-1,0
WPOFFS,0,0,SPH_OFST
SPHERE, 0, SPH_FINE_R, 0,360            ! 內氣球 7mm（內球統一 ESIZE_SHELL；無 0.1 細 core）
SPHERE, 0, MID_SPH_R, 0,360             ! [ADDED] 中間氣球 25mm（VOVLAP 後成 7..25mm 殼，@ESIZE_MID 1.5mm）
WPOFFS,0,0, -SPH_OFST + YOKE_H/2 - AIR_CYL_H/2
CYL4,0,0,AIR_CYL_R, ,,,AIR_CYL_H        ! 外氣圓柱

! ===== [ADDED 2026-08-04] coil 1 實體環（向量位用；取代 SOURC36 primitive）=====
!   尺寸對齊 SOURC36 標稱值：內 5 / 外 8 mm、高 = PROT_H = 7mm、截面積 21mm^2、體積 857.655 mm^3
!   位置：P1 = 下極方位 0°、圓心 (YOKE_MID_R, 0)、z 由 0 往下到 -PROT_H（與該極 protrusion 同軸同高）
!   ⚠ 必須建在此處：外氣圓柱之後、下面單一 VOVLAP,ALL 之前 → 才會與外圈空氣切分並共節點。
!     線圈 100% 落在最外層外圓柱空氣內（最近點距 WP 39.9mm > 中球 30mm），不碰內/中球。
!   ⚠ COIL_IN_R_G = PROT_R 是刻意共面（對齊標稱值）；若 mesh 出 sliver，退路 = 改 5.02e-3（20µm 間隙）
COIL_IN_R_G  = 5e-3
COIL_OUT_R_G = 8e-3
COIL_H_G     = PROT_H
WPLANE, 1,0,0,0,,,,,,
WPcsys,-1,0
CYL4, YOKE_MID_R, 0, COIL_IN_R_G, 0, COIL_OUT_R_G, 360, -COIL_H_G

! ===== 單一 VOVLAP（含 core 球 + coil）=====
ALLSEL,ALL
VOVLAP,ALL
NUMCMP,VOLU

! ===== 材料 + 元素型別 =====
MAT_AIR1    = 1   ! inner air sphere (R<=7mm) @ESIZE_SHELL
MAT_MT      = 2   ! 1018 steel (poles + protrusion + yoke)
MAT_AIR2    = 3   ! outer cylinder air @ESIZE_OUTER
MAT_AIR_MID = 4   ! [ADDED] mid air shell (7..25mm) @ESIZE_MID
MAT_CU      = 5   ! [ADDED 2026-08-04] coil 1 銅線圈（非磁性 μr=1；DC 靜磁不需 rsvx）
mp , murx , MAT_AIR1    , 1
mp , murx , MAT_MT      , 280
mp , murx , MAT_AIR2    , 1
mp , murx , MAT_AIR_MID , 1
mp , murx , MAT_CU      , 1
! [MODIFIED 2026-08-04] 純量位 SOLID96 → 向量位 edge element SOLID237（DOF = AZ）
!   SOLID237 = 3-D 10-node 四面體版；SOLID236 是 20-node 六面體版，本 deck 走 free-tet 故用 237。
!   SOURC36（ET_curr）整段刪除：它只服務純量位 MAG 自由度，與 AZ 不相容；
!   電流改由 solve deck 對 MAT_CU 元素施方位向 BFE,,JS（|J| = NI/A = 70/21e-6 = 3.3333e6 A/m^2）。
ET_nocurr = 1
ET , ET_nocurr , SOLID237

! ===== [ADDED] VATT by location+size（booleans 清屬性 → 不可硬編 volume 號）=====
!   判據（順序重要）：dwp = centroid 到 WP 距離[m]；vsz = volume 體積[m^3]
!     1) vsz>5e-4         -> 外圓柱氣 MAT_AIR2 (~1.27e-3)
!     2) dwp>10mm         -> 鋼 cone/yoke/prot 連通塊 MAT_MT (含 dwp 15-22mm、vsz 可達 3e-5 的鋼塊)
!     3) vsz>1e-5         -> 中間球殼氣 MAT_AIR_MID (R30 後 ~1.03e-4，質心在 WP dwp~0；必在內球判斷前)
!     4) vsz>5e-7         -> 內球氣 MAT_AIR1 (~1.4e-6)
!     5) 其餘             -> 內球內鋼極尖段 MAT_MT (vsz~1e-8、dwp~5mm)
!   實測(R30 DIAG)：內球 1.4e-6 < 中球殼 1.03e-4 < 外圓柱 1.27e-3；門檻 5e-4 介於中球殼與外圓柱之間。
!   鋼塊 dwp 5-22mm（近 WP 尖段 dwp~5mm vsz<5e-7、遠塊 dwp>10mm）。R30>yoke26mm → 鋼不被中球切。
ALLSEL,ALL
*get, VMAX, VOLU,, NUM, MAX
*do, vi, 1, VMAX
	VSEL,S,VOLU,,vi
	VSUM
	*get, vsz, VOLU, vi, VOLU                ! 體積(若不存在回 0)
	*if, vsz, GT, 0, then
		*get, cx, VOLU, vi, CENT, X
		*get, cy, VOLU, vi, CENT, Y
		*get, cz, VOLU, vi, CENT, Z
		dwp = sqrt( cx*cx + cy*cy + (cz-SPH_OFST)*(cz-SPH_OFST) )
		! [ADDED 2026-08-04] 🔴 線圈判別必須在「鋼」之前：線圈 dwp=48.4mm > 10mm，
		!   否則會被下面的 dwp>10mm 分支判成 μr=280 的鋼、**靜默報廢整個結果**。
		!   三個條件唯一鎖定線圈：體積 8.577e-7 m^3、質心 rxy=47.5mm、z=-3.5mm。
		!   APDL *IF 不支援複合條件 → 先算旗標。
		rxy = sqrt( cx*cx + cy*cy )
		is_coil = 0
		*if, vsz, LT, 1e-6, then
			*if, abs(rxy - YOKE_MID_R), LT, 1e-3, then
				*if, abs(cz + PROT_H/2), LT, 1e-3, then
					is_coil = 1
				*endif
			*endif
		*endif
		*if, is_coil, EQ, 1, then
			VATT, MAT_CU, 1, ET_nocurr         ! [ADDED] coil 1 銅環
		*elseif, vsz, GT, 5e-4, then
			VATT, MAT_AIR2, 1, ET_nocurr       ! 外圓柱空氣 (~1.27e-3)；門檻 5e-4 介於 mid(R30 後 ~1.03e-4) 與 outer(1.27e-3) 之間
		*elseif, dwp, GT, 10e-3, then
			VATT, MAT_MT, 1, ET_nocurr         ! [FIX] 鋼連通塊/cone/yoke (dwp>10mm；含 VOL17 vsz=3.1e-5 鋼，必在中球判斷前先抓)
		*elseif, vsz, GT, 1e-5, then
			VATT, MAT_AIR_MID, 1, ET_nocurr    ! [FIX 移上來] 中間球殼空氣 (~6.1e-5，質心在 WP dwp~0)；原被 dwp<CORE_R 誤判成內球
		*elseif, vsz, GT, 5e-7, then
			VATT, MAT_AIR1, 1, ET_nocurr       ! 內球空氣 (~1.4e-6)
		*else
			VATT, MAT_MT, 1, ET_nocurr         ! 內球內的鋼極尖段 (tiny vsz ~1e-8，dwp~5mm)
		*endif
	*endif
*enddo
ALLSEL,ALL

! ===== [REMOVED 2026-08-04] SOURC36 線圈 primitive（原 57 行）=====
!   原 graded deck 在此建 6 個 SOURC36 三節點 primitive。SOURC36 只服務純量位 MAG 自由度、
!   與 AZ 不相容 → 向量位改用「實體線圈 volume（已於 VOVLAP 前建）+ solve 端方位向 BFE,,JS」。

! ===== [ADDED 2026-08-04] 材料分類驗證（VATT 之後、mesh 之前）=====
!   🔴 最容易靜默出錯的一項：線圈若被判成 MAT_MT(μr=280) 整個結果報廢且不報錯。
!   期望：MAT_CU 1 個 volume、體積 8.5766e-7 m^3（= pi*(8^2-5^2)*7 mm^3 = 857.655 mm^3）
ALLSEL,ALL
VSEL,S,MAT,,MAT_CU      $ *get,NV_CU, VOLU,0,COUNT $ VSUM $ *get,VOL_CU, VOLU,0,VOLU
VSEL,S,MAT,,MAT_MT      $ *get,NV_MT, VOLU,0,COUNT $ VSUM $ *get,VOL_MT, VOLU,0,VOLU
VSEL,S,MAT,,MAT_AIR1    $ *get,NV_A1, VOLU,0,COUNT $ VSUM $ *get,VOL_A1, VOLU,0,VOLU
VSEL,S,MAT,,MAT_AIR_MID $ *get,NV_MID,VOLU,0,COUNT $ VSUM $ *get,VOL_MID,VOLU,0,VOLU
VSEL,S,MAT,,MAT_AIR2    $ *get,NV_A2, VOLU,0,COUNT $ VSUM $ *get,VOL_A2, VOLU,0,VOLU
ALLSEL,ALL
COIL_VOL_EXP = 3.141592653589793*(COIL_OUT_R_G**2 - COIL_IN_R_G**2)*COIL_H_G
*status,NV_CU  $ *status,VOL_CU $ *status,COIL_VOL_EXP
*status,NV_MT  $ *status,VOL_MT
*status,NV_A1  $ *status,VOL_A1
*status,NV_MID $ *status,VOL_MID
*status,NV_A2  $ *status,VOL_A2

! ============================================================================
! region-graded free-tet mesh（細→粗；每區均勻）
! ============================================================================
MSHAPE,1,3D
MSHKEY,0
! [PURE smrt5 2026-06-25] 不設任何 LESIZE/AESIZE 強制尺寸 —— 一旦設就 sliver/thrash（試 ~12 次證實）。
!   smrt5 自動：幾何細處(尖端/邊角)變細、遠場變粗。tip/protrusion/WP 的細網格留給 Stage2 NREFINE。

! 球座標 CS（@WP）：給鋼極依球半徑選取用
LOCAL,98,2,0,0,SPH_OFST

! ============================================================================
! [PURE smrt5 base 2026-06-25] 純 SMRTSIZE,5 + vmesh,all（= baseline 做法，實證 494k、不 thrash）。
!   無任何 AESIZE/LESIZE 強制尺寸。smrt5 自動：尖端/邊角細、遠場粗。WP/磁極細網格 → Stage2 NREFINE。
! ============================================================================
! [MODIFIED 2026-08-04] 5 → 8：SOLID237 是 edge element，DOF ≈ 邊數（線性四面體約 節點+元素）。
!   graded 那張 3.9M 元素 / 4.58M 邊換過去需 80–120 GB in-core、單次 solve 10–20 小時 → 不可行。
!   交叉測試不需要 12µm 的 WP 解析度（APDL 已自證 WP 場對網格不敏感：baseline 8.66 vs graded 8.82，1.8%）。
!   ⚠ 鐵律不變：此幾何**不可**加任何 LESIZE/AESIZE 強制尺寸（試 ~12 次必 sliver/thrash），只能純 smrt。
SMRTSIZE,SMRT_LVL       ! [MODIFIED 2026-08-04] 寫死 8 → 吃頂部 SMRT_LVL 旗標（8=定案、6=加密對照）
MSHAPE,1,3D
MSHKEY,0

ALLSEL,ALL
VMESH,ALL
ALLSEL,ALL

! ============================================================================
! [ADDED 2026-06-25 folded] 磁極 cone 加密（在 smrt5 base 上 EREFINE，不重 mesh、不 thrash）
!   smrt5 base 各區量測：內球~0.15 / 中球~1.2 / yoke~0.6 / 外圓柱~3.7mm 都已 ≥ PDF，
!   只磁極 cone ~0.6mm 比 PDF(0.3) 粗 → 局部 EREFINE 加密。支撐座 + coil 鐵柱(protrusion)
!   維持 smrt5 粗：far-field 厚鋼、磁通近均勻、不影響精度，且其鑲於超粗外圈空氣中 EREFINE 無法局部細化。
!   兩步在現成網格分裂、不重走 free-tet。LOCAL,98(球座標@WP) 已定義於上方。
! ============================================================================
! [MODIFIED 2026-08-04] 向量位版**關閉**兩段 cone EREFINE（旗標 CONE_REF_LVL=0）。
!   理由：edge element DOF ≈ 邊數，加密代價比純量位高得多；本測試要的是「同一物理、換數值路徑」的
!   位準比較，不需要 graded 那級的 cone 解析度。要開回去把 CONE_REF_LVL 設 1。
CONE_REF_LVL = 0
*if, CONE_REF_LVL, GT, 0, then
	! Step1 全極 cone +1 級
	ESEL,S,MAT,,MAT_MT
	CSYS,98
	ESEL,R,CENT,X, 2e-3, 18e-3              ! cone 帶（排尖端 R<2、排 yoke/prot R>18）
	CSYS,0
	EREFINE,ALL, , ,CONE_REF_LVL, ,OFF
	ALLSEL,ALL
	! Step2 下極 P1/P3/P6 cone 再 +1 級（全域 Z<-11.5mm 乾淨切出下極、不誤抓上極）
	ESEL,S,MAT,,MAT_MT
	CSYS,98
	ESEL,R,CENT,X, 2e-3, 18e-3
	CSYS,0
	ESEL,R,CENT,Z, -1.0, -11.5e-3
	EREFINE,ALL, , ,CONE_REF_LVL, ,OFF
	ALLSEL,ALL
*endif

! [ADDED 2026-07-21] 變體 WP-region refine（整顆內球 MAT_AIR1 uniform +N）— 補鈍尖變體的 WP 場解析度。
!   baseline WP_REF_LVL=0（關閉；baseline WP 已被尖端奇異點鋪密，不需也不該再加）。
!   tip 變體（鈍尖無奇異點 → smrt5 把 WP 鋪很粗，R<=150um 只剩 ~11 節點 < 18 參數）由 driver sed 成 1（或更高）。
!   ⚠ 局部 WP-core refine 在此幾何一定 fail（"poor solid model description" / "bad element shape"，
!     帶幾何關聯與 MODMSH,DETACH 都試過）→ 只能整顆內球 uniform refine（tune 驗證 0 error）。
WP_REF_LVL = 0
*if, WP_REF_LVL, GT, 0, then
	ESEL,S,MAT,,MAT_AIR1
	EREFINE,ALL, , ,WP_REF_LVL, ,OFF
	ALLSEL,ALL
*endif

! ===== 元素 component（依材料；給 solve/檢視用）=====
ESEL,S,MAT,,MAT_MT      $ CM,COMP_MT,ELEM     $ ALLSEL,ALL
ESEL,S,MAT,,MAT_AIR1    $ CM,COMP_AIR1,ELEM   $ ALLSEL,ALL
ESEL,S,MAT,,MAT_AIR_MID $ CM,COMP_AIRMID,ELEM $ ALLSEL,ALL
ESEL,S,MAT,,MAT_AIR2    $ CM,COMP_AIR2,ELEM   $ ALLSEL,ALL
ESEL,S,MAT,,MAT_CU      $ CM,COMP_COIL,ELEM   $ ALLSEL,ALL   ! [ADDED] solve deck 施 BFE,,JS 就選這組

! ===== report + SAVE（mesh-only，無 /SOLU、無 D,ALL,MAG,0）=====
! [ADDED] 診斷摘要：total + 每材料 elem/volume 數 + core 區 node 數（從 .out 即可判分類對不對）
ALLSEL,ALL
*GET, NE_TOT, ELEM, 0, COUNT
*GET, NN_TOT, NODE, 0, COUNT
ESEL,S,MAT,,MAT_AIR1    $ *GET, NE_A1,  ELEM, 0, COUNT $ ALLSEL,ALL
ESEL,S,MAT,,MAT_AIR_MID $ *GET, NE_MID, ELEM, 0, COUNT $ ALLSEL,ALL
ESEL,S,MAT,,MAT_MT      $ *GET, NE_MT,  ELEM, 0, COUNT $ ALLSEL,ALL
ESEL,S,MAT,,MAT_AIR2    $ *GET, NE_A2,  ELEM, 0, COUNT $ ALLSEL,ALL
ESEL,S,MAT,,MAT_CU      $ *GET, NE_CU,  ELEM, 0, COUNT $ ALLSEL,ALL   ! [ADDED] 線圈元素數（必 >0）
VSEL,S,MAT,,MAT_AIR1    $ *GET, NV_A1,  VOLU, 0, COUNT $ ALLSEL,ALL
VSEL,S,MAT,,MAT_AIR_MID $ *GET, NV_MID, VOLU, 0, COUNT $ ALLSEL,ALL
VSEL,S,MAT,,MAT_MT      $ *GET, NV_MT,  VOLU, 0, COUNT $ ALLSEL,ALL
VSEL,S,MAT,,MAT_AIR2    $ *GET, NV_A2,  VOLU, 0, COUNT $ ALLSEL,ALL
CSYS,98
NSEL,S,LOC,X, 0, CORE_R
*GET, NN_CORE, NODE, 0, COUNT
CSYS,0
ALLSEL,ALL
/com, ================= MESH SUMMARY =================
*VWRITE, NN_TOT, NE_TOT
('TOTAL  nodes = ',F12.0,'   elements = ',F12.0)
*VWRITE, NE_A1, NE_MID, NE_MT, NE_A2
('ELEM   AIR1(inner) = ',F12.0,'   MID = ',F12.0,'   STEEL = ',F12.0,'   AIR2(outer) = ',F12.0)
*VWRITE, NV_A1, NV_MID, NV_MT, NV_A2
('VOLU   AIR1 = ',F8.0,'   MID = ',F8.0,'   STEEL = ',F8.0,'   AIR2 = ',F8.0)
*VWRITE, NN_CORE
('CORE   nodes (R < CORE_R) = ',F12.0)
! [ADDED 2026-08-04] 線圈驗證：元素數必 >0、體積必 ≈ 8.5766e-7 m^3
*VWRITE, NE_CU, VOL_CU, COIL_VOL_EXP
('COIL   elems = ',F12.0,'   volume = ',E14.6,' m^3   (expected ',E14.6,')')
/com, ===============================================

SAVE                 ! [MODIFIED] → mesh_vp<tag>.db（/FILNAME 已設；供 sim/vp solve deck RESUME）
FINISH
