! ============================================================================
! MT_Sweep_Tipcut_template.txt — single-pole TIPCUT sweep (ONE-SHOT geom+mesh+solve+extract)
!   Placeholders (driver run_sweep.sh sed-substitutes per case):
!     __XCUT__   = tip-cut plane x [metre]  (e.g. 0.500e-3 .. 0.550e-3)
!     __OUTDIR__ = .dat output dir          (…\data\coil1\singlepole_tipcut_sweep\tipcut_x<um>)
!   +x graded single-pole, WP core 0.022mm, tip cut at XCUT, coil flipped 1A, magsolv DSP.
!   Scratch /CWD = db\sim\singlepole_tipcut_sweep (reused per case; driver full-cleans after).
!   Merged from mesh/MT_Mesh_SinglePole_Tipcut.txt + sim/singlepole/MT_Sim_SinglePole_Tipcut.txt.
! ============================================================================
/CWD,'G:\my_workspace\code\FEM_sim\magnetic_sim\ANSYS\main\ANSYS_data\long2016_hexapole_halfcut\db\sim\singlepole\tipcut_sweep'
Finish
/cle
/CLEAR,NOSTART
/TITLE, single pole TIPCUT sweep (+x, graded)
/FILNAME,swp,1
/PREP7

! ----- parameters (MKS metre) -----
POLE_NUM = 6
*afun, DEG
BTOL, 1e-6
/UNITS, MKS

R_norm    = 500e-6
R_norm_xy = R_norm*sqrt(2.0/3.0)
R_norm_z  = R_norm/sqrt(3.0)

YOKE_IN_R  = 84e-3/2.0
YOKE_OUT_R = 106e-3/2.0
YOKE_MID_R = (YOKE_IN_R + YOKE_OUT_R)/2.0
YOKE_H     = 2.0e-3
PROT_R     = 10.0e-3/2.0
PROT_H     = 7.0e-3

POLE_R        = 6.0e-3/2
POLE_TIP_R    = 40.0e-6
POLE_CONE_LEN = 15e-3
POLE_CONE_HYP = sqrt(POLE_CONE_LEN**2 + POLE_R**2)
ANG1 = acos(POLE_R/POLE_CONE_HYP)
ANG2 = 90 - ANG1
L = POLE_CONE_LEN*POLE_TIP_R/POLE_R
POLE_TIP_CENTER = L/cos(ANG2)
POLE_CONE2_LEN  = L*cos(ANG2)
POLE_TIP_R2     = POLE_TIP_R*cos(ANG2)
POLE_TIP_FILLET_DROP = POLE_TIP_CENTER - POLE_TIP_R
POLE_TIP_FILLET_PROT = (POLE_CONE2_LEN - POLE_TIP_FILLET_DROP)

ESIZE_IRON  = 0.3e-3
ESIZE_SPH   = 0.4e-3
ESIZE_OUTER = 4.0e-3

! ===== single lower protrusion (coil pillar) at azimuth 0deg =====
WPLANE, 1,0,0,0,,,,,,
WPcsys,-1,0
CYL4, YOKE_MID_R*cos(0), YOKE_MID_R*sin(0), PROT_R, ,,, -PROT_H

! ===== single lower pole (azimuth 0deg) — FILLED full cone =====
X0_LOW = YOKE_MID_R*cos(0)
Y0_LOW = YOKE_MID_R*sin(0)
Z0_LOW = -PROT_H

WPLANE, 1,0,0,0,,,,,,
WPcsys,-1,0
ROTA_ANG = 0
WPROTA, ROTA_ANG

BLOCK, X0_LOW - 5e-3,  X0_LOW + 11e-3, Y0_LOW - 5e-3,  Y0_LOW + 5e-3,  Z0_LOW - 10e-3, Z0_LOW
BLOCK, X0_LOW - 5e-3,  X0_LOW - 2e-3,  Y0_LOW - 10e-3, Y0_LOW + 10e-3, Z0_LOW - 10e-3, Z0_LOW - 5e-3
BLOCK, X0_LOW - 10e-3, X0_LOW - 2e-3,  Y0_LOW - 5e-3,  Y0_LOW + 5e-3,  Z0_LOW - 10e-3, Z0_LOW - 2e-3
BLOCK, X0_LOW - 10e-3, X0_LOW - 5e-3,  Y0_LOW - 10e-3, Y0_LOW + 10e-3, Z0_LOW - 10e-3, Z0_LOW - 5e-3

*get, KP_NUM, KP  , ,NUM, MAX
*get, LI_NUM, LINE, ,NUM, MAX
KP_START = KP_NUM + 1
LI_START = LI_NUM + 1
numstr, KP,   KP_START
numstr, LINE, LI_START

l1 = R_norm_xy
l1_ang = atan2( 0 , R_norm_xy )
l2 = sqrt( (R_norm_xy + POLE_TIP_FILLET_PROT)**2 + POLE_TIP_R2**2 )
l2_ang = atan2( POLE_TIP_R2 , (R_norm_xy + POLE_TIP_FILLET_PROT) )
POLE_CONE_LEN_SHIFT = POLE_CONE_LEN + (R_norm_xy - POLE_TIP_FILLET_DROP)
l3 = sqrt( POLE_CONE_LEN_SHIFT**2 + POLE_R**2 )
l3_ang = atan2( POLE_R , POLE_CONE_LEN )
l4 = sqrt( (X0_LOW - 10e-3)**2 + POLE_R**2 )
l4_ang = atan2( POLE_R , (X0_LOW - 10e-3) )
l5 = abs( X0_LOW - 10e-3 )
l5_ang = atan2( 0 , (X0_LOW - 10e-3) )
l6 = abs( R_norm_xy + POLE_TIP_R )
l6_ang = atan2( 0, R_norm_xy + POLE_TIP_R )

K , , l1*cos(ROTA_ANG + l1_ang) , l1*sin(ROTA_ANG + l1_ang), Z0_LOW - 6e-3
K , , l2*cos(ROTA_ANG + l2_ang) , l2*sin(ROTA_ANG + l2_ang), Z0_LOW - 6e-3
K , , l3*cos(ROTA_ANG + l3_ang) , l3*sin(ROTA_ANG + l3_ang), Z0_LOW - 6e-3
K , , l4*cos(ROTA_ANG + l4_ang) , l4*sin(ROTA_ANG + l4_ang), Z0_LOW - 6e-3
K , , l5*cos(ROTA_ANG + l5_ang) , l5*sin(ROTA_ANG + l5_ang), Z0_LOW - 6e-3
K , , l6*cos(ROTA_ANG + l6_ang) , l6*sin(ROTA_ANG + l6_ang), Z0_LOW - 6e-3

LARC , KP_START , KP_START + 1 , KP_START + 5 , POLE_TIP_R
L , KP_START + 1 , KP_START + 2,,,,,,,,
L , KP_START + 2 , KP_START + 3,,,,,,,,
L , KP_START + 3 , KP_START + 4,,,,,,,,
L , KP_START + 4 , KP_START,,,,,,,,

*get, AR_NUM, AREA, ,NUM, MAX
AR_START = AR_NUM + 1
numstr, AREA, AR_START

AL, LI_START, LI_START + 1, LI_START + 2, LI_START + 3, LI_START + 4
VROTAT, AR_START, ,,,,,KP_START,KP_START + 4,,4

ALLSEL

! ===== merge steel (protrusion+blocks+cone) -> 1 vol =====
ALLSEL, ALL
VADD, ALL
NUMCMP, VOLU
*get, vsteel, VOLU,, NUM, MAX

! ===== re-orient pole to +x axis: tip apex -> (R_norm,0,0), WP at ORIGIN =====
X_SHIFT = R_norm - R_norm_xy
Z_SHIFT = -(Z0_LOW - 6e-3)
ALLSEL, ALL
VGEN, 1, ALL, , , X_SHIFT, 0, Z_SHIFT, , , 1
NUMCMP, VOLU
*get, vsteel, VOLU,, NUM, MAX
ALLSEL, ALL

! ===== TIP-CUT: yz-plane (perp x) at x=XCUT; delete x<XCUT tip cap, keep x>XCUT body =====
XCUT = __XCUT__
WPLANE, -1, XCUT,0,0, XCUT,1,0, XCUT,0,1
VSBW, vsteel
WPCSYS, -1, 0
CSYS, 0
ALLSEL, ALL
VSEL, S, LOC, X, -100, XCUT
VDELE, ALL, , , 1
ALLSEL, ALL
NUMCMP, VOLU
*get, vsteel, VOLU,, NUM, MAX

! ===== air domain (graded): WP core R450um + inner R7 + mid R25 spheres + outer R80xH70 cylinder =====
CORE_R     = 0.45e-3
CORE_ESIZE = 0.022e-3
SPH_FINE_R = 7e-3
MID_SPH_R  = 25e-3
SPH_OFST = 0
AIR_CYL_R = 80e-3
AIR_CYL_H = 70e-3
WPLANE, 1,0,0,0,,,,,,
WPcsys,-1,0
WPOFFS,0,0,SPH_OFST
SPHERE, 0, CORE_R, 0,360
SPHERE, 0, SPH_FINE_R, 0,360
SPHERE, 0, MID_SPH_R, 0,360
WPOFFS,0,0, SPH_OFST - AIR_CYL_H/2
CYL4,0,0,AIR_CYL_R, ,,,AIR_CYL_H

ALLSEL,ALL
VOVLAP,ALL
NUMCMP,VOLU

! ===== materials + element types =====
MAT_AIR1     = 1
MAT_MT       = 2
MAT_AIR2     = 3
MAT_AIR_MID  = 4
MAT_AIR_CORE = 5
mp , murx , MAT_AIR1     , 1
mp , murx , MAT_MT       , 280
mp , murx , MAT_AIR2     , 1
mp , murx , MAT_AIR_MID  , 1
mp , murx , MAT_AIR_CORE , 1
ET_nocurr = 1
ET_curr   = 2
ET , ET_nocurr , SOLID96
ET , ET_curr   , SOURC36

! ===== VATT by location+size (VOVLAP cleared attrs -> classify) =====
ALLSEL,ALL
*get, VMAX, VOLU,, NUM, MAX
*do, vi, 1, VMAX
	VSEL,S,VOLU,,vi
	VSUM
	*get, vsz, VOLU, vi, VOLU
	*if, vsz, GT, 0, then
		*get, cx, VOLU, vi, CENT, X
		*get, cy, VOLU, vi, CENT, Y
		*get, cz, VOLU, vi, CENT, Z
		dwp = sqrt( cx*cx + cy*cy + (cz-SPH_OFST)*(cz-SPH_OFST) )
		*if, vsz, GT, 5e-4, then
			VATT, MAT_AIR2, 1, ET_nocurr
		*elseif, dwp, GT, 10e-3, then
			VATT, MAT_MT, 1, ET_nocurr
		*elseif, vsz, GT, 1e-5, then
			VATT, MAT_AIR_MID, 1, ET_nocurr
		*elseif, vsz, GT, 5e-7, then
			VATT, MAT_AIR1, 1, ET_nocurr
		*elseif, dwp, LT, 1e-3, then
			VATT, MAT_AIR_CORE, 1, ET_nocurr
		*else
			VATT, MAT_MT, 1, ET_nocurr
		*endif
	*endif
*enddo
ALLSEL,ALL

! ===== SOURC36 coil (single lower coil @ 0deg; flipped 1A) =====
COIL_OUT_R = 8e-3
COIL_IN_R  = 5e-3
TURNS = 70
COIL_THK = COIL_OUT_R - COIL_IN_R
COIL_R = (COIL_IN_R + COIL_OUT_R)/2
COIL_H = PROT_H
R,1,1,-TURNS*1,COIL_THK,COIL_H
WPLANE, 1,0,0,0,,,,,,
WPcsys,-1,0
NUMCMP,NODE
*get, NODE_NUM,NODE,,NUM,MAX
NODE_START = NODE_NUM + 1
X0_LOW = YOKE_MID_R*cos(0)
Y0_LOW = YOKE_MID_R*sin(0)
Z0_LOW = -PROT_H
N , NODE_START   , X0_LOW + COIL_R + X_SHIFT , Y0_LOW          , Z0_LOW + COIL_H/2 + Z_SHIFT
N , NODE_START+1 , X0_LOW + X_SHIFT          , Y0_LOW + COIL_R , Z0_LOW + COIL_H/2 + Z_SHIFT
N , NODE_START+2 , X0_LOW + X_SHIFT          , Y0_LOW          , Z0_LOW + COIL_H/2 + Z_SHIFT
TYPE,ET_curr
REAL,1
E, NODE_START, NODE_START+1, NODE_START+2
/ESHAPE,1

! ===== mesh: WP core forced CORE_ESIZE + SMRTSIZE,5 rest + EREFINE pole cone x2 =====
!   (⚠ 試過固定 ESIZE 分區統一網格 → core 0.022mm→內氣固定 0.4mm 梯度過渡暴走 1.8M 節點；smrt5 才化得了核心球過渡，見 memory fixed-esize-vs-core-sphere)
LOCAL, 98, 2, 0, 0, SPH_OFST
MSHAPE,1,3D
MSHKEY,0
ESIZE, CORE_ESIZE
VSEL, S, MAT, , MAT_AIR_CORE
VMESH, ALL
ALLSEL, ALL
ESIZE, 0
SMRTSIZE, 5
VSEL, ALL
VSEL, U, MAT, , MAT_AIR_CORE
VMESH, ALL
ALLSEL, ALL

ESEL,S,MAT,,MAT_MT
CSYS,98
ESEL,R,CENT,X, 2e-3, 18e-3
CSYS,0
*GET, nc1, ELEM, 0, COUNT
*IF, nc1, GT, 0, THEN
  EREFINE,ALL, , ,1, ,OFF
*ENDIF
ALLSEL,ALL
ESEL,S,MAT,,MAT_MT
CSYS,98
ESEL,R,CENT,X, 2e-3, 18e-3
CSYS,0
*GET, nc2, ELEM, 0, COUNT
*IF, nc2, GT, 0, THEN
  EREFINE,ALL, , ,1, ,OFF
*ENDIF
ALLSEL,ALL
CSYS,0

ALLSEL, ALL
NUMCMP, NODE
NUMCMP, ELEM
*GET, nnode, NODE, 0, COUNT
*GET, nelem, ELEM, 0, COUNT
/GO
*MSG, INFO, nnode, nelem
 MESH DONE (tipcut sweep +x): %G nodes / %G elems

! ===== BC: MAG=0 on outer R80 cylinder (side + z caps) =====
/SOLU
AIR_CYL_Z_CTR = SPH_OFST
AIR_CYL_Z_BOT = AIR_CYL_Z_CTR - AIR_CYL_H/2
AIR_CYL_Z_TOP = AIR_CYL_Z_CTR + AIR_CYL_H/2
LOCAL, 11, 1, 0, 0, 0
CSYS, 11
NSEL, S, LOC, X, AIR_CYL_R - 0.5e-3, AIR_CYL_R + 0.5e-3
CSYS, 0
NSEL, A, LOC, Z, AIR_CYL_Z_TOP - 0.5e-3, AIR_CYL_Z_TOP + 0.5e-3
NSEL, A, LOC, Z, AIR_CYL_Z_BOT - 0.5e-3, AIR_CYL_Z_BOT + 0.5e-3
*GET, NBC, NODE, 0, COUNT
D, ALL, MAG, 0
ALLSEL, ALL
/GO
*MSG, INFO, NBC
 BC nodes on R80 cylinder = %G

! ===== solve (DSP) =====
magsolv, 3
FINISH

! ===== POST1: extract B -> __OUTDIR__ =====
/POST1
SET, LAST
ALLSEL, ALL
/HEADER, OFF,OFF,OFF,OFF,OFF,OFF
/FORMAT, 10, , 20, 12, ,
/PAGE, 1000000, , 1000000
/OUTPUT, '__OUTDIR__\coord_all', 'dat'
NLIST, ALL, , , COORD
/OUTPUT
/OUTPUT, '__OUTDIR__\bfield_all', 'dat'
PRNSOL, B, COMP
/OUTPUT
LOCAL, 12, 2, 0, 0, SPH_OFST
CSYS, 12
NSEL, S, LOC, X, 0, 2e-3
CSYS, 0
/OUTPUT, '__OUTDIR__\coord_tip', 'dat'
NLIST, ALL, , , COORD
/OUTPUT
/OUTPUT, '__OUTDIR__\bfield_tip', 'dat'
PRNSOL, B, COMP
/OUTPUT
ALLSEL, ALL
FINISH
/EXIT, NOSAV
